// SBML level 3 version 1

model model_0000001()
  // Fernandez2006_ModelB
  // To the extent possible under law, all copyright and related or neighbouring rights to this encoded model have been dedicated to the public domain worldwide. Please refer to CC0 Public Domain Dedication for more information.
  // In summary, you are entitled to use this encoded model in absolutely any manner you deem suitable, verbatim, or with modification, alone or embedded it in a larger context, redistribute it, commercially or not, in a restricted way or not.
  // To cite BioModels Database, please use: Li C, Donizelli M, Rodriguez N, Dharuri H, Endler L, Chelliah V, Li L, He E, Henry A, Stefan MI, Snoep JL, Hucka M, Le Novère N, Laibe C (2010) BioModels Database: An enhanced, curated and annotated resource for published quantitative kinetic models. BMC Syst Biol., 4:92.
  // This model was automatically converted from BIOMD0000000153 to SBML L3V1 by using libSBML.
  // There were the following warnings during the conversion process:
  // In situations where a mathematical expression refers to a compartment, species or parameter, it is necessary to know the units of the object to establish unit consistency. In models where the units of an object have not been declared, libSBML does not yet have the functionality to accurately verify the consistency of the units in mathematical expressions referring to that object. The units of the <parameter> 'k57' cannot be fully checked. Unit consistency reported as either no errors or further unit errors related to this object may not be accurate.
  // If the attribute 'units' on a given Parameter object has not been set, then the unit of measurement associated with that parameter's value is undefined. Reference: L3V1 Section 4.7.3
  // In situations where a mathematical expression refers to a compartment, species or parameter, it is necessary to know the units of the object to establish unit consistency. In models where the units of an object have not been declared, libSBML does not yet have the functionality to accurately verify the consistency of the units in mathematical expressions referring to that object. The units of the <parameter> 'cAMP_delay' cannot be fully checked. Unit consistency reported as either no errors or further unit errors related to this object may not be accurate.
  // If the attribute 'units' on a given Parameter object has not been set, then the unit of measurement associated with that parameter's value is undefined. Reference: L3V1 Section 4.7.3
  // In situations where a mathematical expression refers to a compartment, species or parameter, it is necessary to know the units of the object to establish unit consistency. In models where the units of an object have not been declared, libSBML does not yet have the functionality to accurately verify the consistency of the units in mathematical expressions referring to that object. The units of the <parameter> 'cAMP_Ca_delay' cannot be fully checked. Unit consistency reported as either no errors or further unit errors related to this object may not be accurate.
  // If the attribute 'units' on a given Parameter object has not been set, then the unit of measurement associated with that parameter's value is undefined. Reference: L3V1 Section 4.7.3
  // In situations where a mathematical expression refers to a compartment, species or parameter, it is necessary to know the units of the object to establish unit consistency. In models where the units of an object have not been declared, libSBML does not yet have the functionality to accurately verify the consistency of the units in mathematical expressions referring to that object. The units of the <parameter> 'kon_high' cannot be fully checked. Unit consistency reported as either no errors or further unit errors related to this object may not be accurate.
  // If the attribute 'units' on a given Parameter object has not been set, then the unit of measurement associated with that parameter's value is undefined. Reference: L3V1 Section 4.7.3
  // In situations where a mathematical expression refers to a compartment, species or parameter, it is necessary to know the units of the object to establish unit consistency. In models where the units of an object have not been declared, libSBML does not yet have the functionality to accurately verify the consistency of the units in mathematical expressions referring to that object. The units of the <parameter> 'spike_duration' cannot be fully checked. Unit consistency reported as either no errors or further unit errors related to this object may not be accurate.
  // If the attribute 'units' on a given Parameter object has not been set, then the unit of measurement associated with that parameter's value is undefined. Reference: L3V1 Section 4.7.3
  // In situations where a mathematical expression refers to a compartment, species or parameter, it is necessary to know the units of the object to establish unit consistency. In models where the units of an object have not been declared, libSBML does not yet have the functionality to accurately verify the consistency of the units in mathematical expressions referring to that object. The units of the <parameter> 'spike_interval' cannot be fully checked. Unit consistency reported as either no errors or further unit errors related to this object may not be accurate.
  // If the attribute 'units' on a given Parameter object has not been set, then the unit of measurement associated with that parameter's value is undefined. Reference: L3V1 Section 4.7.3
  // In situations where a mathematical expression refers to a compartment, species or parameter, it is necessary to know the units of the object to establish unit consistency. In models where the units of an object have not been declared, libSBML does not yet have the functionality to accurately verify the consistency of the units in mathematical expressions referring to that object. The units of the <parameter> 'kon_low' cannot be fully checked. Unit consistency reported as either no errors or further unit errors related to this object may not be accurate.
  // If the attribute 'units' on a given Parameter object has not been set, then the unit of measurement associated with that parameter's value is undefined. Reference: L3V1 Section 4.7.3
  // In situations where a mathematical expression contains literal numbers or parameters whose units have not been declared, it is not possible to verify accurately the consistency of the units in the expression. The units of the <kineticLaw> <math> expression 'Spine * kon1 * D * CDK5' cannot be fully checked. Unit consistency reported as either no errors or further unit errors related to this object may not be accurate.
  // In situations where a mathematical expression contains literal numbers or parameters whose units have not been declared, it is not possible to verify accurately the consistency of the units in the expression. The units of the <kineticLaw> <math> expression 'Spine * D_CDK5 * koff1' cannot be fully checked. Unit consistency reported as either no errors or further unit errors related to this object may not be accurate.
  // In situations where a mathematical expression contains literal numbers or parameters whose units have not been declared, it is not possible to verify accurately the consistency of the units in the expression. The units of the <kineticLaw> <math> expression 'Spine * D_CDK5 * kcat1' cannot be fully checked. Unit consistency reported as either no errors or further unit errors related to this object may not be accurate.
  // In situations where a mathematical expression contains literal numbers or parameters whose units have not been declared, it is not possible to verify accurately the consistency of the units in the expression. The units of the <kineticLaw> <math> expression 'Spine * D * CK1 * kon2' cannot be fully checked. Unit consistency reported as either no errors or further unit errors related to this object may not be accurate.
  // In situations where a mathematical expression contains literal numbers or parameters whose units have not been declared, it is not possible to verify accurately the consistency of the units in the expression. The units of the <kineticLaw> <math> expression 'Spine * koff2 * D_CK1' cannot be fully checked. Unit consistency reported as either no errors or further unit errors related to this object may not be accurate.
  // In situations where a mathematical expression contains literal numbers or parameters whose units have not been declared, it is not possible to verify accurately the consistency of the units in the expression. The units of the <kineticLaw> <math> expression 'Spine * kcat2 * D_CK1' cannot be fully checked. Unit consistency reported as either no errors or further unit errors related to this object may not be accurate.
  // In situations where a mathematical expression contains literal numbers or parameters whose units have not been declared, it is not possible to verify accurately the consistency of the units in the expression. The units of the <kineticLaw> <math> expression 'Spine * D * PKA * kon3' cannot be fully checked. Unit consistency reported as either no errors or further unit errors related to this object may not be accurate.
  // In situations where a mathematical expression contains literal numbers or parameters whose units have not been declared, it is not possible to verify accurately the consistency of the units in the expression. The units of the <kineticLaw> <math> expression 'Spine * D_PKA * koff3' cannot be fully checked. Unit consistency reported as either no errors or further unit errors related to this object may not be accurate.
  // In situations where a mathematical expression contains literal numbers or parameters whose units have not been declared, it is not possible to verify accurately the consistency of the units in the expression. The units of the <kineticLaw> <math> expression 'Spine * D_PKA * kcat3' cannot be fully checked. Unit consistency reported as either no errors or further unit errors related to this object may not be accurate.
  // In situations where a mathematical expression contains literal numbers or parameters whose units have not been declared, it is not possible to verify accurately the consistency of the units in the expression. The units of the <kineticLaw> <math> expression 'Spine * D34 * CDK5 * kon4' cannot be fully checked. Unit consistency reported as either no errors or further unit errors related to this object may not be accurate.
  // In situations where a mathematical expression contains literal numbers or parameters whose units have not been declared, it is not possible to verify accurately the consistency of the units in the expression. The units of the <kineticLaw> <math> expression 'Spine * D34 * CK1 * kon5' cannot be fully checked. Unit consistency reported as either no errors or further unit errors related to this object may not be accurate.
  // In situations where a mathematical expression contains literal numbers or parameters whose units have not been declared, it is not possible to verify accurately the consistency of the units in the expression. The units of the <kineticLaw> <math> expression 'Spine * D34 * PP2B * kon6' cannot be fully checked. Unit consistency reported as either no errors or further unit errors related to this object may not be accurate.
  // In situations where a mathematical expression contains literal numbers or parameters whose units have not been declared, it is not possible to verify accurately the consistency of the units in the expression. The units of the <kineticLaw> <math> expression 'Spine * D34_CDK5 * koff4' cannot be fully checked. Unit consistency reported as either no errors or further unit errors related to this object may not be accurate.
  // In situations where a mathematical expression contains literal numbers or parameters whose units have not been declared, it is not possible to verify accurately the consistency of the units in the expression. The units of the <kineticLaw> <math> expression 'Spine * D34_CDK5 * kcat4' cannot be fully checked. Unit consistency reported as either no errors or further unit errors related to this object may not be accurate.
  // In situations where a mathematical expression contains literal numbers or parameters whose units have not been declared, it is not possible to verify accurately the consistency of the units in the expression. The units of the <kineticLaw> <math> expression 'Spine * D34_CK1 * koff5' cannot be fully checked. Unit consistency reported as either no errors or further unit errors related to this object may not be accurate.
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  // biomodels.db:MODEL3492674214
  // biomodels.db:BIOMD0000000153
  // isDescribedBy pubmed:17194217
  // isVersionOf GO:0007212 GO:0035235
  // hasTaxon taxonomy:9606
  // model units - substance: substance, time: second, volume: volume, area: area, length: metre, extent: substance

  // Compartments:
  compartment Spine = 1e-15 volume;  // isVersionOf GO:0043197

  // Species:
  species D in Spine = 4.98e-6;  // isVersionOf uniprot:Q9UD71
  species CDK5 in Spine = 2e-7;  // uniprot:Q03114
  species D_CDK5 in Spine = 0;  // hasPart uniprot:Q03114 uniprot:Q9UD71
  species D75 in Spine = 0;  // isVersionOf uniprot:Q9UD71
  species CK1 in Spine = 1.66e-7;  // isVersionOf uniprot:Q99PS2
  species D_CK1 in Spine = 0;  // hasPart uniprot:Q99PS2 uniprot:Q9UD71
  species D137 in Spine = 0;  // isVersionOf uniprot:Q9UD71
  species PKA in Spine = 0;  // isVersionOf pirsf:PIRSF000582
  species D_PKA in Spine = 0;  // hasPart uniprot:Q9UD71 pirsf:PIRSF000582
  species D34 in Spine = 0;  // isVersionOf uniprot:Q9UD71
  species D34_CDK5 in Spine = 0;  // hasPart uniprot:Q03114 uniprot:Q9UD71
  species D34_CK1 in Spine = 0;  // hasPart uniprot:Q99PS2 uniprot:Q9UD71
  species PP2B in Spine = 0;  // hasPart CHEBI:29108 pirsf:PIRSF000911
  species D34_PP2B in Spine = 0;  // hasPart CHEBI:29108 uniprot:Q9UD71 pirsf:PIRSF000911
  species D34_75 in Spine = 0; D34_75 is "D34:75";  // isVersionOf uniprot:Q9UD71
  species D34_137 in Spine = 0; D34_137 is "D34:137";  // isVersionOf uniprot:Q9UD71
  species D75CK1 in Spine = 0; D75CK1 is "D75_CK1";  // hasPart uniprot:Q99PS2 uniprot:Q9UD71
  species D75_PKA in Spine = 0;  // hasPart uniprot:Q9UD71 pirsf:PIRSF000582
  species PP2A in Spine = 2e-7;  // isVersionOf interpro:IPR006186
  species D75_PP2A in Spine = 0;  // hasPart uniprot:Q9UD71 interpro:IPR006186
  species PP2AP in Spine = 0;  // isVersionOf interpro:IPR006186
  species D75_PP2AP in Spine = 0;  // hasPart uniprot:Q9UD71 interpro:IPR006186
  species D75_137 in Spine = 0; D75_137 is "D75:137";  // isVersionOf uniprot:Q9UD71
  species D137_CDK5 in Spine = 0;  // hasPart uniprot:Q03114 uniprot:Q9UD71
  species D137_PKA in Spine = 0;  // hasPart uniprot:Q9UD71 pirsf:PIRSF000582
  species D137_PP2C in Spine = 0;  // hasPart uniprot:Q9UD71 interpro:IPR015655
  species PP2C in Spine = 1.33e-7;  // isVersionOf interpro:IPR015655
  species D34_75_CK1 in Spine = 0; D34_75_CK1 is "D34:75_CK1";  // hasPart uniprot:Q99PS2 uniprot:Q9UD71
  species D34_137_CDK5 in Spine = 0; D34_137_CDK5 is "D34:137_CDK5";  // hasPart uniprot:Q03114 uniprot:Q9UD71
  species D34_75_137 in Spine = 0; D34_75_137 is "D34:75:137";  // isVersionOf uniprot:Q9UD71
  species D75_137_PKA in Spine = 0; D75_137_PKA is "D75:137_PKA";  // hasPart uniprot:Q9UD71 pirsf:PIRSF000582
  species D34_75_PP2B in Spine = 0; D34_75_PP2B is "D34:75_PP2B";  // hasPart CHEBI:29108 uniprot:Q9UD71 pirsf:PIRSF000911
  species D34_137_PP2B in Spine = 0; D34_137_PP2B is "D34:137_PP2B";  // hasPart CHEBI:29108 uniprot:Q9UD71 pirsf:PIRSF000911
  species D34_75_137_PP2B in Spine = 0; D34_75_137_PP2B is "D34:75:137_PP2B";  // hasPart CHEBI:29108 uniprot:Q9UD71 pirsf:PIRSF000911
  species D34_75_PP2A in Spine = 0; D34_75_PP2A is "D34:75_PP2A";  // hasPart uniprot:Q9UD71 interpro:IPR006186
  species D75_137_PP2A in Spine = 0; D75_137_PP2A is "D75:137_PP2A";  // hasPart uniprot:Q9UD71 interpro:IPR006186
  species D34_75_137_PP2A in Spine = 0; D34_75_137_PP2A is "D34:75:137_PP2A";  // hasPart uniprot:Q9UD71 interpro:IPR006186
  species D34_75_PP2AP in Spine = 0; D34_75_PP2AP is "D34:75_PP2AP";  // hasPart uniprot:Q9UD71 interpro:IPR006186
  species D75_137_PP2AP in Spine = 0; D75_137_PP2AP is "D75:137_PP2AP";  // hasPart uniprot:Q9UD71 interpro:IPR006186
  species D34_75_137_PP2AP in Spine = 0; D34_75_137_PP2AP is "D34:75:137_PP2AP";  // hasPart uniprot:Q9UD71 interpro:IPR006186
  species D34_137_PP2C in Spine = 0; D34_137_PP2C is "D34:137_PP2C";  // hasPart uniprot:Q9UD71 interpro:IPR015655
  species D75_137_PP2C in Spine = 0; D75_137_PP2C is "D75:137_PP2C";  // hasPart uniprot:Q9UD71 interpro:IPR015655
  species PDE in Spine = 2e-6;  // isVersionOf interpro:IPR000396
  species PP2Binactive in Spine = 3.32e-7;  // isVersionOf pirsf:PIRSF000911
  species D34_75_137_PP2C in Spine = 0; D34_75_137_PP2C is "D34:75:137_PP2C";  // hasPart uniprot:Q9UD71 interpro:IPR015655
  species CK1P in Spine = 0;  // isVersionOf uniprot:Q99PS2
  species CK1P_PP2B in Spine = 0;  // hasPart uniprot:Q99PS2 pirsf:PIRSF000911
  species PDE_PKA in Spine = 0;  // hasPart interpro:IPR000396 pirsf:PIRSF000582
  species PDEP in Spine = 0;  // isVersionOf interpro:IPR000396
  species PP2A_PKA in Spine = 0;  // hasPart interpro:IPR006186 pirsf:PIRSF000582
  species Ca in Spine = 0;  // CHEBI:29108
  species PP2BinactiveCa2 in Spine = 0;  // hasPart CHEBI:29108 pirsf:PIRSF000911
  species R2C2 in Spine = 6.64e-6;  // hasPart pirsf:PIRSF000548 pirsf:PIRSF000582
  species cAMP in Spine = 0;  // CHEBI:17489
  species cAMP_R2C2 in Spine = 0;  // hasPart CHEBI:17489 pirsf:PIRSF000548 pirsf:PIRSF000582
  species cAMP2_R2C2 in Spine = 0;  // hasPart CHEBI:17489 pirsf:PIRSF000548 pirsf:PIRSF000582
  species cAMP3_R2C2 in Spine = 0;  // hasPart CHEBI:17489 pirsf:PIRSF000548 pirsf:PIRSF000582
  species cAMP4_R2C2 in Spine = 0;  // hasPart CHEBI:17489 pirsf:PIRSF000548 pirsf:PIRSF000582
  species cAMP4_R2C in Spine = 0;  // hasPart CHEBI:17489 pirsf:PIRSF000548 pirsf:PIRSF000582
  species cAMP4_R2 in Spine = 0;  // hasPart CHEBI:17489 pirsf:PIRSF000548
  species cAMP_PDE in Spine = 0;  // hasPart CHEBI:17489 interpro:IPR000396
  species AMP in Spine = 0;  // CHEBI:16027
  species cAMP_PDEP in Spine = 0;  // hasPart CHEBI:17489 interpro:IPR000396
  species PP2ACa in Spine = 0;  // isVersionOf interpro:IPR006186
  species D34_75_PP2ACa in Spine = 0; D34_75_PP2ACa is "D34:75_PP2ACa";  // hasPart CHEBI:29108 uniprot:Q9UD71 interpro:IPR006186
  species D34_75_137_PP2ACa in Spine = 0; D34_75_137_PP2ACa is "D34:75:137_PP2ACa";  // hasPart CHEBI:29108 uniprot:Q9UD71 interpro:IPR006186
  species D75_PP2ACa in Spine = 0;  // hasPart CHEBI:29108 uniprot:Q9UD71 interpro:IPR006186
  species D75_137_PP2ACa in Spine = 0; D75_137_PP2ACa is "D75:137_PP2ACa";  // hasPart CHEBI:29108 uniprot:Q9UD71 interpro:IPR006186
  species D34_75_PP2APCa in Spine = 0; D34_75_PP2APCa is "D34:75_PP2APCa";  // hasPart CHEBI:29108 uniprot:Q9UD71 interpro:IPR006186
  species PP2APCa in Spine = 0;  // hasPart CHEBI:29108 interpro:IPR006186
  species D34_75_137_PP2APCa in Spine = 0; D34_75_137_PP2APCa is "D34:75:137_PP2APCa";  // hasPart CHEBI:29108 uniprot:Q9UD71 interpro:IPR006186
  species D75_PP2APCa in Spine = 0;  // hasPart CHEBI:29108 uniprot:Q9UD71 interpro:IPR006186
  species D75_137_PP2APCa in Spine = 0; D75_137_PP2APCa is "D75:137_PP2APCa";  // hasPart CHEBI:29108 uniprot:Q9UD71 interpro:IPR006186
  species PP2ACa_PKA in Spine = 0;  // hasPart CHEBI:29108 interpro:IPR006186 pirsf:PIRSF000582
  species $Empty in Spine = 0;

  // Parameters:
  k57 = 2.5e-8; k57 is "ca_in";
  cAMP_delay = 400;
  cAMP_Ca_delay = 50;
  kon_high = 6.6e-6;
  spike_duration = 2;
  spike_interval = 2;
  kon_low = 2.5e-8;

  // Reactions:
  von1: D + CDK5 => D_CDK5; Spine*kon1*D*CDK5; von1 is "D_CDK5_binding";
    kon1 = 5600000;
  voff1: D_CDK5 => D + CDK5; Spine*D_CDK5*koff1; voff1 is "D_CDK5_unbinding";
    koff1 = 12;
  vcat1: D_CDK5 => D75 + CDK5; Spine*D_CDK5*kcat1; vcat1 is "DPhospho_by_CDK5_on_75";
    kcat1 = 3;
  von2: D + CK1 => D_CK1; Spine*D*CK1*kon2; von2 is "DCDK1_binding";
    kon2 = 4400000;
  voff2: D_CK1 => D + CK1; Spine*koff2*D_CK1; voff2 is "D_CDK1_unbinding";
    koff2 = 12;
  vcat2: D_CK1 => D137 + CK1; Spine*kcat2*D_CK1; vcat2 is "D_Phospho_by_CK1_on_137";
    kcat2 = 3;
  von3: D + PKA => D_PKA; Spine*D*PKA*kon3; von3 is "D_PKA_binding";
    kon3 = 5600000;
  voff3: D_PKA => D + PKA; Spine*D_PKA*koff3; voff3 is "D_PKA_unbinding";
    koff3 = 10.8;
  vcat3: D_PKA => D34 + PKA; Spine*D_PKA*kcat3; vcat3 is "D_Phospho_by_PKA_on_34";
    kcat3 = 2.7;
  von4: D34 + CDK5 => D34_CDK5; Spine*D34*CDK5*kon4; von4 is "D34_CDK5_binding";
    kon4 = 5600000;
  von5: D34 + CK1 => D34_CK1; Spine*D34*CK1*kon5; von5 is "D34_CK1_binding";
    kon5 = 4400000;
  von6: D34 + PP2B => D34_PP2B; Spine*D34*PP2B*kon6; von6 is "D34_PP2B_binding";
    kon6 = 10000000;
  voff4: D34_CDK5 => D34 + CDK5; Spine*D34_CDK5*koff4; voff4 is "D34_CDK5_unbinding";
    koff4 = 12;
  vcat4: D34_CDK5 => D34_75 + CDK5; Spine*D34_CDK5*kcat4; vcat4 is "D34_Phospho_by_CDK5_on_75";
    kcat4 = 3;
  voff5: D34_CK1 => D34 + CK1; Spine*D34_CK1*koff5; voff5 is "D34_CK1_unbinding";
    koff5 = 12;
  vcat5: D34_CK1 => D34_137 + CK1; Spine*D34_CK1*kcat5; vcat5 is "D34_Phospho_by_CK1_on_137";
    kcat5 = 3;
  vcat6: D34_PP2B => D + PP2B; Spine*D34_PP2B*kcat6; vcat6 is "D34_Dephospho_by_PP2B";
    kcat6 = 4;
  voff6: D34_PP2B => D34 + PP2B; Spine*D34_PP2B*koff6; voff6 is "D34_PP2B_unbinding";
    koff6 = 16;
  von7: D75 + CK1 => D75CK1; Spine*D75*CK1*kon7; von7 is "D75_CK1_binding";
    kon7 = 4400000;
  von8: D75 + PKA => D75_PKA; Spine*D75*PKA*kon8; von8 is "D75_PKA_binding";
    kon8 = 5600000;
  von9: D75 + PP2A => D75_PP2A; Spine*D75*PP2A*kon9; von9 is "D75_PP2A_binding";
    kon9 = 3800000;
  von10: D75 + PP2AP => D75_PP2AP; Spine*D75*PP2AP*kon10; von10 is "D75_PP2AP_binding";
    kon10 = 17000000;
  voff7: D75CK1 => D75 + CK1; Spine*D75CK1*koff7; voff7 is "D75_CK1_unbinding";
    koff7 = 12;
  vcat7: D75CK1 => CK1 + D75_137; Spine*D75CK1*kcat7; vcat7 is "D75_Phospho_by_CK1_on_137";
    kcat7 = 3;
  vcat8: D75_PKA => D34_75 + PKA; Spine*D75_PKA*kcat8; vcat8 is "D75_Phospho_by_PKA_on_34";
    kcat8 = 0;
  voff8: D75_PKA => D75 + PKA; Spine*D75_PKA*koff8; voff8 is "D75_PKA_unbinding";
    koff8 = 10.8;
  vcat9: D75_PP2A => D + PP2A; Spine*D75_PP2A*kcat9; vcat9 is "D75_dephospho_by_PP2A";
    kcat9 = 10;
  voff9: D75_PP2A => D75 + PP2A; Spine*D75_PP2A*koff9; voff9 is "D75_PP2A_unbinding";
    koff9 = 24;
  vcat10: D75_PP2AP => D + PP2AP; Spine*D75_PP2AP*kcat10; vcat10 is "D75_dephospho_by_PP2AP";
    kcat10 = 24;
  voff10: D75_PP2AP => D75 + PP2AP; Spine*D75_PP2AP*koff10; voff10 is "D75_PP2AP_unbinding";
    koff10 = 40;
  von11: D137 + CDK5 => D137_CDK5; Spine*D137*CDK5*kon11; von11 is "D137_CDK5_binding";
    kon11 = 5600000;
  von12: D137 + PKA => D137_PKA; Spine*D137*PKA*kon12; von12 is "D137_PKA_binding";
    kon12 = 5600000;
  von13: D137 + PP2C => D137_PP2C; Spine*D137*PP2C*kon13; von13 is "D137_PP2C_binding";
    kon13 = 7500000;
  voff11: D137_CDK5 => D137 + CDK5; Spine*D137_CDK5*koff11; voff11 is "D137_CDK5_unbinding";
    koff11 = 12;
  vcat11: D137_CDK5 => D75_137 + CDK5; Spine*D137_CDK5*kcat11; vcat11 is "D137_Phospho_by_CDK5_on_75";
    kcat11 = 3;
  voff12: D137_PKA => D137 + PKA; Spine*D137_PKA*koff12; voff12 is "D137_PKA_unbinding";
    koff12 = 10.8;
  vcat12: D137_PKA => D34_137 + PKA; Spine*D137_PKA*kcat12; vcat12 is "D137_phospho_by_PKA_on_34";
    kcat12 = 2.7;
  vcat13: D137_PP2C => D + PP2C; Spine*D137_PP2C*kcat13; vcat13 is "D137_dephospho_by_PP2C";
    kcat13 = 3;
  voff13: D137_PP2C => D137 + PP2C; Spine*D137_PP2C*koff13; voff13 is "D137_PP2C_unbinding";
    koff13 = 12;
  von14: D34_75 + CK1 => D34_75_CK1; Spine*D34_75*CK1*kon14; von14 is "D34:75_CK1_binding";
    kon14 = 4400000;
  von18: D34_137 + CDK5 => D34_137_CDK5; Spine*D34_137*CDK5*kon18; von18 is "D34:137_CDK5_binding";
    kon18 = 5600000;
  voff18: D34_137_CDK5 => D34_137 + CDK5; Spine*D34_137_CDK5*koff18; voff18 is "D34:137_CDK5_unbinding";
    koff18 = 12;
  voff14: D34_75_CK1 => D34_75 + CK1; Spine*D34_75_CK1*koff14; voff14 is "D34:75_CK1_unbinding";
    koff14 = 12;
  vcat14: D34_75_CK1 => D34_75_137 + CK1; Spine*D34_75_CK1*kcat14; vcat14 is "D34:75_phospho_by_CK1_on_137";
    kcat14 = 3;
  vcat18: D34_137_CDK5 => D34_75_137 + CDK5; Spine*D34_137_CDK5*kcat18; vcat18 is "D34:137_phospho_by_CDK5_on_75";
    kcat18 = 3;
  von21: D75_137 + PKA => D75_137_PKA; Spine*D75_137*PKA*kon21; von21 is "D75:137_PKA_binding";
    kon21 = 5600000;
  vcat21: D75_137_PKA => D34_75_137 + PKA; Spine*D75_137_PKA*kcat21; vcat21 is "D75:137_phospho_by_PKA_on_34";
    kcat21 = 0;
  voff21: D75_137_PKA => D75_137 + PKA; Spine*D75_137_PKA*koff21; voff21 is "D75:137_PKA_unbinding";
    koff21 = 10.8;
  von17: D34_75 + PP2B => D34_75_PP2B; Spine*D34_75*PP2B*kon17; von17 is "D34:75_PP2B_binding";
    kon17 = 10000000;
  voff17: D34_75_PP2B => D34_75 + PP2B; Spine*D34_75_PP2B*koff17; voff17 is "D34:75_PP2B_unbinding";
    koff17 = 1600;
  vcat17: D34_75_PP2B => D75 + PP2B; Spine*D34_75_PP2B*kcat17; vcat17 is "D34:75_dephopsho_by_PP2B_on_34";
    kcat17 = 4;
  von19: D34_137 + PP2B => D34_137_PP2B; Spine*D34_137*PP2B*kon19; von19 is "D34:137_PP2B_binding";
    kon19 = 75000;
  vcat19: D34_137_PP2B => D137 + PP2B; Spine*D34_137_PP2B*kcat19; vcat19 is "D34:137_dephospho_by_PP2B_on_34";
    kcat19 = 0.03;
  voff19: D34_137_PP2B => D34_137 + PP2B; Spine*D34_137_PP2B*koff19; voff19 is "D34:137_PP2B_unbinding";
    koff19 = 0.12;
  von27: D34_75_137 + PP2B => D34_75_137_PP2B; Spine*D34_75_137*PP2B*kon27; von27 is "D34:75:137_PP2B_binding";
    kon27 = 75000;
  voff27: D34_75_137_PP2B => D34_75_137 + PP2B; Spine*D34_75_137_PP2B*koff27; voff27 is "D34:75:137_PP2B_unbinding";
    koff27 = 120;
  vcat27: D34_75_137_PP2B => D75_137 + PP2B; Spine*D34_75_137_PP2B*kcat27; vcat27 is "D34:75:137_dephospho_by_PP2B_on_34";
    kcat27 = 0.03;
  von15: D34_75 + PP2A => D34_75_PP2A; Spine*D34_75*PP2A*kon15; von15 is "D34:75_PP2A_binding";
    kon15 = 3800000;
  vcat15: D34_75_PP2A => D34 + PP2A; Spine*D34_75_PP2A*kcat15; vcat15 is "D34:75_dephospho_by_PP2A_on_75";
    kcat15 = 10;
  voff15: D34_75_PP2A => D34_75 + PP2A; Spine*D34_75_PP2A*koff15; voff15 is "D34:75_PP2A_unbinding";
    koff15 = 24;
  von22: D75_137 + PP2A => D75_137_PP2A; Spine*D75_137*PP2A*kon22; von22 is "D75:137_PP2A_binding";
    kon22 = 3800000;
  vcat22: D75_137_PP2A => D137 + PP2A; Spine*D75_137_PP2A*kcat22; vcat22 is "D75:137_dephospho_by_PP2A_on_75";
    kcat22 = 10;
  voff22: D75_137_PP2A => D75_137 + PP2A; Spine*D75_137_PP2A*koff22; voff22 is "D75:137_PP2A_unbinding";
    koff22 = 24;
  von25: D34_75_137 + PP2A => D34_75_137_PP2A; Spine*D34_75_137*PP2A*kon25; von25 is "D34:75:137_PP2A_binding";
    kon25 = 3800000;
  vcat25: D34_75_137_PP2A => D34_137 + PP2A; Spine*D34_75_137_PP2A*kcat25; vcat25 is "D34:75:137_dephospho_by_PP2A_on_75";
    kcat25 = 10;
  voff25: D34_75_137_PP2A => D34_75_137 + PP2A; Spine*D34_75_137_PP2A*koff25; voff25 is "D34:75:137_PP2A_unbinding";
    koff25 = 24;
  von16: D34_75 + PP2AP => D34_75_PP2AP; Spine*D34_75*PP2AP*kon16; von16 is "D34:75_PP2AP_binding";
    kon16 = 17000000;
  vcat16: D34_75_PP2AP => D34 + PP2AP; Spine*D34_75_PP2AP*kcat16; vcat16 is "D34:75_dephospho_by_PP2AP_on_75";
    kcat16 = 24;
  voff16: D34_75_PP2AP => D34_75 + PP2AP; Spine*D34_75_PP2AP*koff16; voff16 is "D34:75_PP2AP_unbinding";
    koff16 = 40;
  von23: D75_137 + PP2AP => D75_137_PP2AP; Spine*D75_137*PP2AP*kon23; von23 is "D75:137_PP2AP_binding";
    kon23 = 17000000;
  vcat23: D75_137_PP2AP => D137 + PP2AP; Spine*D75_137_PP2AP*kcat23; vcat23 is "D75:137_dephospho_by_PP2AP_on_75";
    kcat23 = 24;
  voff23: D75_137_PP2AP => D75_137 + PP2AP; Spine*D75_137_PP2AP*koff23; voff23 is "D75:137_PP2AP_unbinding";
    koff23 = 40;
  vcat26: D34_75_137_PP2AP => D34_137 + PP2AP; Spine*D34_75_137_PP2AP*kcat26; vcat26 is "D34:75:137_dephospho_by_PP2AP_on 75";
    kcat26 = 24;
  von26: D34_75_137 + PP2AP => D34_75_137_PP2AP; Spine*D34_75_137*PP2AP*kon26; von26 is "D34:75:137_PP2AP_binding";
    kon26 = 17000000;
  voff26: D34_75_137_PP2AP => D34_75_137 + PP2AP; Spine*D34_75_137_PP2AP*koff26; voff26 is "D34:75:137_PP2AP_unbinding";
    koff26 = 40;
  von20: D34_137 + PP2C => D34_137_PP2C; Spine*D34_137*PP2C*kon20; von20 is "D34:137_PP2C_binding";
    kon20 = 7500000;
  vcat20: D34_137_PP2C => D34 + PP2C; Spine*D34_137_PP2C*kcat20; vcat20 is "D34:137_dephospho_by_PP2C_on_137";
    kcat20 = 3;
  voff20: D34_137_PP2C => D34_137 + PP2C; Spine*D34_137_PP2C*koff20; voff20 is "D34:137_PP2C_unbinding";
    koff20 = 12;
  von24: D75_137 + PP2C => D75_137_PP2C; Spine*D75_137*PP2C*kon24; von24 is "D75:137_PP2C_binding";
    kon24 = 7500000;
  vcat24: D75_137_PP2C => D75 + PP2C; Spine*D75_137_PP2C*kcat24; vcat24 is "D75:137_dephospho_by_PP2C_137";
    kcat24 = 3;
  voff24: D75_137_PP2C => D75_137 + PP2C; Spine*D75_137_PP2C*koff24; voff24 is "D75:137_PP2C_unbinding";
    koff24 = 12;
  von28: D34_75_137 + PP2C => D34_75_137_PP2C; Spine*D34_75_137*PP2C*kon28; von28 is "D34:75:137_PP2C_binding";
    kon28 = 7500000;
  vcat28: D34_75_137_PP2C => D34_75 + PP2C; Spine*D34_75_137_PP2C*kcat28; vcat28 is "D34:75:137_dephospho_by_PP2C_on_137";
    kcat28 = 3;
  voff28: D34_75_137_PP2C => D34_75_137 + PP2C; Spine*D34_75_137_PP2C*koff28; voff28 is "D34:75:137_PP2C_unbinding";
    koff28 = 12;
  von29: CK1P + PP2B => CK1P_PP2B; Spine*CK1P*PP2B*kon29; von29 is "CK1P_PP2B_binding";
    kon29 = 30000000;
  voff29: CK1P_PP2B => CK1P + PP2B; Spine*CK1P_PP2B*koff29; voff29 is "CK1P_PP2B_unbinding";
    koff29 = 24;
  vcat29: CK1P_PP2B => CK1 + PP2B; Spine*CK1P_PP2B*kcat29; vcat29 is "CK1P_dephospho_by_PP2B";
    kcat29 = 6;
  vcat30: CK1 => CK1P; Spine*CK1*kcat30; vcat30 is "CK1_phosphorylation";
    kcat30 = 1;
  von31: PDE + PKA => PDE_PKA; Spine*PDE*PKA*kon31; von31 is "PDE_PKA_binding";
    kon31 = 6000000;
  vcat31: PDE_PKA => PDEP + PKA; Spine*PDE_PKA*kcat31; vcat31 is "PDE_phospho_by_PKA";
    kcat31 = 9;
  voff31: PDE_PKA => PDE + PKA; Spine*PDE_PKA*koff31; voff31 is "PDE_PKA_unbinding";
    koff31 = 36;
  vcat32: PDEP => PDE; Spine*PDEP*kcat32; vcat32 is "PDEP_dephospho";
    kcat32 = 0.1;
  von33: PP2A + PKA => PP2A_PKA; Spine*PP2A*PKA*kon33; von33 is "PP2A_PKA_binding";
    kon33 = 10000000;
  voff33: PP2A_PKA => PP2A + PKA; Spine*PP2A_PKA*koff33; voff33 is "PP2A_PKA_unbinding";
    koff33 = 16;
  vcat33: PP2A_PKA => PP2AP + PKA; Spine*PP2A_PKA*kcat33; vcat33 is "PP2A_phospho_by_PKA";
    kcat33 = 4;
  vcat34: PP2AP => PP2A; Spine*PP2AP*kcat34; vcat34 is "PP2AP_dephospho";
    kcat34 = 5;
  von35: PP2Binactive + 2 Ca => PP2BinactiveCa2; Spine*PP2Binactive*Ca*Ca*kon35; von35 is "PP2Binactive_Ca_binding";
    kon35 = 1e15;
  von36: PP2BinactiveCa2 + 2 Ca => PP2B; Spine*PP2BinactiveCa2*Ca*Ca*kon36; von36 is "PP2B_activation";
    kon36 = 3e15;
  voff35: PP2BinactiveCa2 => PP2Binactive + 2 Ca; Spine*PP2BinactiveCa2*koff35; voff35 is "PP2BinactiveCa2_Ca_unbinding";
    koff35 = 1;
  voff36: PP2B => PP2BinactiveCa2 + 2 Ca; Spine*PP2B*koff36; voff36 is "PP2B_inactivation";
    koff36 = 1;
  von37: R2C2 + cAMP => cAMP_R2C2; Spine*R2C2*cAMP*kon37; von37 is "R2C2_cAMP_binding";
    kon37 = 54000000;
  von38: cAMP_R2C2 + cAMP => cAMP2_R2C2; Spine*cAMP_R2C2*cAMP*kon38; von38 is "cAMP_R2C2_binding_by_cAMP";
    kon38 = 54000000;
  von39: cAMP2_R2C2 + cAMP => cAMP3_R2C2; Spine*cAMP2_R2C2*cAMP*kon39; von39 is "cAMP2_R2C2_binding_by_cAMP";
    kon39 = 75000000;
  von40: cAMP3_R2C2 + cAMP => cAMP4_R2C2; Spine*cAMP3_R2C2*cAMP*kon40; von40 is "cAMP3_R2C2_binding_by_cAMP";
    kon40 = 75000000;
  voff37: cAMP_R2C2 => R2C2 + cAMP; Spine*cAMP_R2C2*koff37; voff37 is "cAMP_R2C2_unbinding";
    koff37 = 33;
  voff38: cAMP2_R2C2 => cAMP_R2C2 + cAMP; Spine*cAMP2_R2C2*koff38; voff38 is "cAMP2_R2C2_unbinding";
    koff38 = 33;
  voff39: cAMP3_R2C2 => cAMP2_R2C2 + cAMP; Spine*cAMP3_R2C2*koff39; voff39 is "cAMP3_R2C2_unbinding";
    koff39 = 110;
  voff40: cAMP4_R2C2 => cAMP3_R2C2 + cAMP; Spine*cAMP4_R2C2*koff40; voff40 is "cAMP4_R2C2_unbinding";
    koff40 = 32.5;
  von41: cAMP4_R2C + PKA => cAMP4_R2C2; Spine*cAMP4_R2C*PKA*kon41; von41 is "cAMP4_R2C_PKA_binding";
    kon41 = 18000000;
  voff41: cAMP4_R2C2 => cAMP4_R2C + PKA; Spine*cAMP4_R2C2*koff41; voff41 is "cAMP4_R2C2_PKA_unbinding";
    koff41 = 60;
  von42: cAMP4_R2 + PKA => cAMP4_R2C; Spine*cAMP4_R2*PKA*kon42; von42 is "cAMP4_R2_PKA_binding";
    kon42 = 18000000;
  von43: cAMP4_R2C => cAMP4_R2 + PKA; Spine*cAMP4_R2C*kon43; von43 is "cAMP4_R2C_PKA_unbinding";
    kon43 = 60;
  von44: cAMP + PDE => cAMP_PDE; Spine*cAMP*PDE*kon44; von44 is "cAMP_PDE_binding";
    kon44 = 2520000;
  voff44: cAMP_PDE => cAMP + PDE; Spine*cAMP_PDE*koff44; voff44 is "cAMP_PDE_unbinding";
    koff44 = 40;
  vcat44: cAMP_PDE => AMP + PDE; Spine*cAMP_PDE*kcat44; vcat44 is "cAMP_PDE_degradation";
    kcat44 = 10;
  von45: cAMP + PDEP => cAMP_PDEP; Spine*cAMP*PDEP*kon45; von45 is "cAMP_PDEP_binding";
    kon45 = 5040000;
  voff45: cAMP_PDEP => cAMP + PDEP; Spine*cAMP_PDEP*koff45; voff45 is "cAMP_PDEP_unbinding";
    koff45 = 80;
  vcat45: cAMP_PDEP => AMP + PDEP; Spine*cAMP_PDEP*kcat45; vcat45 is "cAMP_PDEP_degradation";
    kcat45 = 20;
  Ca_in: $Empty => Ca; Spine*k57;
  Ca_destroy: Ca => $Empty; Spine*Ca*k58;
    k58 = 1.7;
  von46: D34_75 + PP2ACa => D34_75_PP2ACa; Spine*D34_75*PP2ACa*kon46; von46 is "D34:75_PP2ACa_binding";
    kon46 = 3800000;
  von47: D34_75_137 + PP2ACa => D34_75_137_PP2ACa; Spine*D34_75_137*PP2ACa*kon47; von47 is "D34:75:137_PP2ACa_binding";
    kon47 = 3800000;
  vcat47: D34_75_137_PP2ACa => D34_137 + PP2ACa; Spine*D34_75_137_PP2ACa*kcat47; vcat47 is "D34:75:137_dephospho_by_PP2ACa_on_75";
    kcat47 = 10;
  voff47: D34_75_137_PP2ACa => D34_75_137 + PP2ACa; Spine*D34_75_137_PP2ACa*koff47; voff47 is "D34:75:137_PP2ACa_unbinding";
    koff47 = 6;
  vcat46: D34_75_PP2ACa => D34 + PP2ACa; Spine*D34_75_PP2ACa*kcat46; vcat46 is "D34:75_dephospho_by_PP2ACa_on_75";
    kcat46 = 10;
  voff46: D34_75_PP2ACa => D34_75 + PP2ACa; Spine*D34_75_PP2ACa*koff46; voff46 is "D34:75_PP2ACa_unbinding";
    koff46 = 6;
  von48: D75 + PP2ACa => D75_PP2ACa; Spine*D75*PP2ACa*kon48; von48 is "D75_PP2ACa_binding";
    kon48 = 3800000;
  von49: D75_137 + PP2ACa => D75_137_PP2ACa; Spine*D75_137*PP2ACa*kon49; von49 is "D75:137_PP2ACa_binding";
    kon49 = 3800000;
  vcat49: D75_137_PP2ACa => D137 + PP2ACa; Spine*D75_137_PP2ACa*kcat49; vcat49 is "D75:137_dephospho_by_PP2ACa_on_75";
    kcat49 = 10;
  voff49: D75_137_PP2ACa => D75_137 + PP2ACa; Spine*D75_137_PP2ACa*koff49; voff49 is "D75:137_PP2ACa_unbinding";
    koff49 = 6;
  vcat48: D75_PP2ACa => D + PP2ACa; Spine*D75_PP2ACa*kcat48; vcat48 is "D75_dephospho_by_PP2ACa_on_75";
    kcat48 = 10;
  voff48: D75_PP2ACa => D75 + PP2ACa; Spine*D75_PP2ACa*koff48; voff48 is "D75_PP2ACa_unbinding";
    koff48 = 6;
  von50: D34_75 + PP2APCa => D34_75_PP2APCa; Spine*D34_75*PP2APCa*kon50; von50 is "D34:75_PP2APCa_binding";
    kon50 = 17000000;
  von51: D34_75_137 + PP2APCa => D34_75_137_PP2APCa; Spine*D34_75_137*PP2APCa*kon51; von51 is "D34:75:137_PP2APCa_binding";
    kon51 = 17000000;
  vcat51: D34_75_137_PP2APCa => PP2APCa + D34_137; Spine*D34_75_137_PP2APCa*kcat51; vcat51 is "D34:75:137_dephospho_by_PP2APCa_on_75";
    kcat51 = 24;
  voff51: D34_75_137_PP2APCa => D34_75_137 + PP2APCa; Spine*D34_75_137_PP2APCa*koff51; voff51 is "D34:75:137_PP2APCa_unbinding";
    koff51 = 10;
  vcat50: D34_75_PP2APCa => D34 + PP2APCa; Spine*D34_75_PP2APCa*kcat50; vcat50 is "D34:75_dephospho_by_PP2APCa_on_75";
    kcat50 = 24;
  voff50: D34_75_PP2APCa => D34_75 + PP2APCa; Spine*D34_75_PP2APCa*koff50; voff50 is "D34:75_PP2APCa_unbinding";
    koff50 = 10;
  von52: D75 + PP2APCa => D75_PP2APCa; Spine*D75*PP2APCa*kon52; von52 is "D75_PP2APCa_binding";
    kon52 = 17000000;
  von53: D75_137 + PP2APCa => D75_137_PP2APCa; Spine*D75_137*PP2APCa*kon53; von53 is "D75:137_PP2APCa_binding";
    kon53 = 17000000;
  vcat53: D75_137_PP2APCa => D137 + PP2APCa; Spine*D75_137_PP2APCa*kcat53; vcat53 is "D75:137_dephospho_by_PP2APCa_on_75";
    kcat53 = 24;
  voff53: D75_137_PP2APCa => D75_137 + PP2APCa; Spine*D75_137_PP2APCa*koff53; voff53 is "D75:137_PP2APCa_unbinding";
    koff53 = 10;
  vcat52: D75_PP2APCa => D + PP2APCa; Spine*D75_PP2APCa*kcat52; vcat52 is "D75_dephospho_by_PP2APCa_on_75";
    kcat52 = 24;
  voff52: D75_PP2APCa => D75 + PP2APCa; Spine*D75_PP2APCa*koff52; voff52 is "D75_PP2APCa_unbinding";
    koff52 = 10;
  von54: Ca + PP2A => PP2ACa; Spine*PP2A*Ca*kon54; von54 is "PP2A_Ca_binding";
    kon54 = 200000;
  voff54: PP2ACa => PP2A + Ca; Spine*PP2ACa*koff54; voff54 is "PP2A_Ca_unbinding";
    koff54 = 1;
  von55: PP2ACa + PKA => PP2ACa_PKA; Spine*PKA*PP2ACa*kon55; von55 is "PP2ACa_PKA_binding";
    kon55 = 10000000;
  vcat55: PP2ACa_PKA => PP2APCa + PKA; Spine*PP2ACa_PKA*kcat55; vcat55 is "PP2ACa_phospho_by_PKA";
    kcat55 = 4;
  von56: PP2AP + Ca => PP2APCa; Spine*PP2AP*Ca*kon56; von56 is "PP2AP_Ca_binding";
    kon56 = 200000;
  voff56: PP2APCa => PP2AP + Ca; Spine*PP2APCa*koff56; voff56 is "PP2APCa_unbinding";
    koff56 = 1;
  vcat56: PP2APCa => PP2ACa; Spine*PP2APCa*kcat56; vcat56 is "PP2APCa_dephospho";
    kcat56 = 5;
  voff55: PP2ACa_PKA => PP2ACa + PKA; Spine*PP2ACa_PKA*koff55; voff55 is "PP2ACa_PKA_unbinding";
    koff55 = 16;

  // Events:
  cAMP_pulse: at (time >= cAMP_delay): cAMP = 6.6e-6;
  ca_on1: at (time >= cAMP_delay + cAMP_Ca_delay): k57 = kon_high;
  ca_on2: at (time >= cAMP_delay + cAMP_Ca_delay + 1*(spike_duration + spike_interval)): k57 = kon_high;
  ca_off1: at (time >= cAMP_delay + cAMP_Ca_delay + spike_duration): k57 = kon_low;
  Ca_on3: at (time >= cAMP_delay + cAMP_Ca_delay + 2*(spike_duration + spike_interval)): k57 = kon_high;
  ca_on4: at (time >= cAMP_delay + cAMP_Ca_delay + 3*(spike_duration + spike_interval)): k57 = kon_high;
  ca_on5: at (time >= cAMP_delay + cAMP_Ca_delay + 4*(spike_duration + spike_interval)): k57 = kon_high;
  ca_on6: at (time >= cAMP_delay + cAMP_Ca_delay + 5*(spike_duration + spike_interval)): k57 = kon_high;
  ca_on7: at (time >= cAMP_delay + cAMP_Ca_delay + 6*(spike_duration + spike_interval)): k57 = kon_high;
  ca_on8: at (time >= cAMP_delay + cAMP_Ca_delay + 7*(spike_duration + spike_interval)): k57 = kon_high;
  ca_on9: at (time >= cAMP_delay + cAMP_Ca_delay + 8*(spike_duration + spike_interval)): k57 = kon_high;
  ca_on10: at (time >= cAMP_delay + cAMP_Ca_delay + 9*(spike_duration + spike_interval)): k57 = kon_high;
  ca_off2: at (time >= cAMP_delay + cAMP_Ca_delay + spike_duration + 1*(spike_interval + spike_duration)): k57 = kon_low;
  ca_off3: at (time >= cAMP_delay + cAMP_Ca_delay + spike_duration + 2*(spike_interval + spike_duration)): k57 = kon_low;
  ca_off4: at (time >= cAMP_delay + cAMP_Ca_delay + spike_duration + 3*(spike_interval + spike_duration)): k57 = kon_low;
  ca_off5: at (time >= cAMP_delay + cAMP_Ca_delay + spike_duration + 4*(spike_interval + spike_duration)): k57 = kon_low;
  ca_off6: at (time >= cAMP_delay + cAMP_Ca_delay + spike_duration + 5*(spike_interval + spike_duration)): k57 = kon_low;
  ca_off7: at (time >= cAMP_delay + cAMP_Ca_delay + spike_duration + 6*(spike_interval + spike_duration)): k57 = kon_low;
  ca_off8: at (time >= cAMP_delay + cAMP_Ca_delay + spike_duration + 7*(spike_interval + spike_duration)): k57 = kon_low;
  ca_off9: at (time >= cAMP_delay + cAMP_Ca_delay + spike_duration + 8*(spike_interval + spike_duration)): k57 = kon_low;
  ca_off10: at (time >= cAMP_delay + cAMP_Ca_delay + spike_duration + 9*(spike_interval + spike_duration)): k57 = kon_low;

  // Unit definitions:
  unit volume = litre;
  unit substance = mole;
  unit area = metre^2;
end
