// SBML level 3 version 1

function Constant_flux__irreversible(v)
  v;
end
Constant_flux__irreversible is "Constant flux (irreversible)";

model model_0000001()
  // Fernandez2006_ModelB
  // model units - substance: substance, time: time, volume: volume, area: area, length: length, extent: substance

  // Compartments:
  compartment Spine = 1e-15 volume;

  // Species:
  species D in Spine = 4.98e-6;
  species CDK5 in Spine = 2e-7;
  species D_CDK5 in Spine = 0;
  species D75 in Spine = 0;
  species CK1 in Spine = 1.66e-7;
  species D_CK1 in Spine = 0;
  species D137 in Spine = 0;
  species PKA in Spine = 0;
  species D_PKA in Spine = 0;
  species D34 in Spine = 0;
  species D34_CDK5 in Spine = 0;
  species D34_CK1 in Spine = 0;
  species PP2B in Spine = 0;
  species D34_PP2B in Spine = 0;
  species D34_75 in Spine = 0; D34_75 is "D34:75";
  species D34_137 in Spine = 0; D34_137 is "D34:137";
  species D75CK1 in Spine = 0; D75CK1 is "D75_CK1";
  species D75_PKA in Spine = 0;
  species PP2A in Spine = 2e-7;
  species D75_PP2A in Spine = 0;
  species PP2AP in Spine = 0;
  species D75_PP2AP in Spine = 0;
  species D75_137 in Spine = 0; D75_137 is "D75:137";
  species D137_CDK5 in Spine = 0;
  species D137_PKA in Spine = 0;
  species D137_PP2C in Spine = 0;
  species PP2C in Spine = 1.33e-7;
  species D34_75_CK1 in Spine = 0; D34_75_CK1 is "D34:75_CK1";
  species D34_137_CDK5 in Spine = 0; D34_137_CDK5 is "D34:137_CDK5";
  species D34_75_137 in Spine = 0; D34_75_137 is "D34:75:137";
  species D75_137_PKA in Spine = 0; D75_137_PKA is "D75:137_PKA";
  species D34_75_PP2B in Spine = 0; D34_75_PP2B is "D34:75_PP2B";
  species D34_137_PP2B in Spine = 0; D34_137_PP2B is "D34:137_PP2B";
  species D34_75_137_PP2B in Spine = 0; D34_75_137_PP2B is "D34:75:137_PP2B";
  species D34_75_PP2A in Spine = 0; D34_75_PP2A is "D34:75_PP2A";
  species D75_137_PP2A in Spine = 0; D75_137_PP2A is "D75:137_PP2A";
  species D34_75_137_PP2A in Spine = 0; D34_75_137_PP2A is "D34:75:137_PP2A";
  species D34_75_PP2AP in Spine = 0; D34_75_PP2AP is "D34:75_PP2AP";
  species D75_137_PP2AP in Spine = 0; D75_137_PP2AP is "D75:137_PP2AP";
  species D34_75_137_PP2AP in Spine = 0; D34_75_137_PP2AP is "D34:75:137_PP2AP";
  species D34_137_PP2C in Spine = 0; D34_137_PP2C is "D34:137_PP2C";
  species D75_137_PP2C in Spine = 0; D75_137_PP2C is "D75:137_PP2C";
  species PDE in Spine = 2e-6;
  species PP2Binactive in Spine = 3.32e-7;
  species D34_75_137_PP2C in Spine = 0; D34_75_137_PP2C is "D34:75:137_PP2C";
  species CK1P in Spine = 0;
  species CK1P_PP2B in Spine = 0;
  species PDE_PKA in Spine = 0;
  species PDEP in Spine = 0;
  species PP2A_PKA in Spine = 0;
  species Ca in Spine = 0;
  species PP2BinactiveCa2 in Spine = 0;
  species R2C2 in Spine = 6.64e-6;
  species cAMP in Spine = 0;
  species cAMP_R2C2 in Spine = 0;
  species cAMP2_R2C2 in Spine = 0;
  species cAMP3_R2C2 in Spine = 0;
  species cAMP4_R2C2 in Spine = 0;
  species cAMP4_R2C in Spine = 0;
  species cAMP4_R2 in Spine = 0;
  species cAMP_PDE in Spine = 0;
  species AMP in Spine = 0;
  species cAMP_PDEP in Spine = 0;
  species PP2ACa in Spine = 0;
  species D34_75_PP2ACa in Spine = 0; D34_75_PP2ACa is "D34:75_PP2ACa";
  species D34_75_137_PP2ACa in Spine = 0; D34_75_137_PP2ACa is "D34:75:137_PP2ACa";
  species D75_PP2ACa in Spine = 0;
  species D75_137_PP2ACa in Spine = 0; D75_137_PP2ACa is "D75:137_PP2ACa";
  species D34_75_PP2APCa in Spine = 0; D34_75_PP2APCa is "D34:75_PP2APCa";
  species PP2APCa in Spine = 0;
  species D34_75_137_PP2APCa in Spine = 0; D34_75_137_PP2APCa is "D34:75:137_PP2APCa";
  species D75_PP2APCa in Spine = 0;
  species D75_137_PP2APCa in Spine = 0; D75_137_PP2APCa is "D75:137_PP2APCa";
  species PP2ACa_PKA in Spine = 0;
  species $Empty in Spine = 0;

  // Parameters:
  k57 = 2.5e-8; k57 is "ca_in";
  cAMP_delay = 200;
  cAMP_Ca_delay = 50;
  kon_high = 6.6e-6;
  spike_duration = 2;
  spike_interval = 2;
  kon_low = 2.5e-8;

  // Reactions:
  von1: D + CDK5 => D_CDK5; Spine*von1_k1*D*CDK5; von1 is "D_CDK5_binding";
    von1_k1 = 5600000;
  voff1: D_CDK5 => D + CDK5; Spine*voff1_k1*D_CDK5; voff1 is "D_CDK5_unbinding";
    voff1_k1 = 12;
  vcat1: D_CDK5 => D75 + CDK5; Spine*vcat1_k1*D_CDK5; vcat1 is "DPhospho_by_CDK5_on_75";
    vcat1_k1 = 3;
  von2: D + CK1 => D_CK1; Spine*von2_k1*D*CK1; von2 is "DCDK1_binding";
    von2_k1 = 4400000;
  voff2: D_CK1 => D + CK1; Spine*voff2_k1*D_CK1; voff2 is "D_CDK1_unbinding";
    voff2_k1 = 12;
  vcat2: D_CK1 => D137 + CK1; Spine*vcat2_k1*D_CK1; vcat2 is "D_Phospho_by_CK1_on_137";
    vcat2_k1 = 3;
  von3: D + PKA => D_PKA; Spine*von3_k1*D*PKA; von3 is "D_PKA_binding";
    von3_k1 = 5600000;
  voff3: D_PKA => D + PKA; Spine*voff3_k1*D_PKA; voff3 is "D_PKA_unbinding";
    voff3_k1 = 10.8;
  vcat3: D_PKA => D34 + PKA; Spine*vcat3_k1*D_PKA; vcat3 is "D_Phospho_by_PKA_on_34";
    vcat3_k1 = 2.7;
  von4: D34 + CDK5 => D34_CDK5; Spine*von4_k1*D34*CDK5; von4 is "D34_CDK5_binding";
    von4_k1 = 5600000;
  von5: D34 + CK1 => D34_CK1; Spine*von5_k1*D34*CK1; von5 is "D34_CK1_binding";
    von5_k1 = 4400000;
  von6: D34 + PP2B => D34_PP2B; Spine*von6_k1*D34*PP2B; von6 is "D34_PP2B_binding";
    von6_k1 = 10000000;
  voff4: D34_CDK5 => D34 + CDK5; Spine*voff4_k1*D34_CDK5; voff4 is "D34_CDK5_unbinding";
    voff4_k1 = 12;
  vcat4: D34_CDK5 => D34_75 + CDK5; Spine*vcat4_k1*D34_CDK5; vcat4 is "D34_Phospho_by_CDK5_on_75";
    vcat4_k1 = 3;
  voff5: D34_CK1 => D34 + CK1; Spine*voff5_k1*D34_CK1; voff5 is "D34_CK1_unbinding";
    voff5_k1 = 12;
  vcat5: D34_CK1 => D34_137 + CK1; Spine*vcat5_k1*D34_CK1; vcat5 is "D34_Phospho_by_CK1_on_137";
    vcat5_k1 = 3;
  vcat6: D34_PP2B => D + PP2B; Spine*vcat6_k1*D34_PP2B; vcat6 is "D34_Dephospho_by_PP2B";
    vcat6_k1 = 4;
  voff6: D34_PP2B => D34 + PP2B; Spine*voff6_k1*D34_PP2B; voff6 is "D34_PP2B_unbinding";
    voff6_k1 = 16;
  von7: D75 + CK1 => D75CK1; Spine*von7_k1*D75*CK1; von7 is "D75_CK1_binding";
    von7_k1 = 4400000;
  von8: D75 + PKA => D75_PKA; Spine*von8_k1*D75*PKA; von8 is "D75_PKA_binding";
    von8_k1 = 5600000;
  von9: D75 + PP2A => D75_PP2A; Spine*von9_k1*D75*PP2A; von9 is "D75_PP2A_binding";
    von9_k1 = 3800000;
  von10: D75 + PP2AP => D75_PP2AP; Spine*von10_k1*D75*PP2AP; von10 is "D75_PP2AP_binding";
    von10_k1 = 17000000;
  voff7: D75CK1 => D75 + CK1; Spine*voff7_k1*D75CK1; voff7 is "D75_CK1_unbinding";
    voff7_k1 = 12;
  vcat7: D75CK1 => CK1 + D75_137; Spine*vcat7_k1*D75CK1; vcat7 is "D75_Phospho_by_CK1_on_137";
    vcat7_k1 = 3;
  vcat8: D75_PKA => D34_75 + PKA; Spine*vcat8_k1*D75_PKA; vcat8 is "D75_Phospho_by_PKA_on_34";
    vcat8_k1 = 0;
  voff8: D75_PKA => D75 + PKA; Spine*voff8_k1*D75_PKA; voff8 is "D75_PKA_unbinding";
    voff8_k1 = 10.8;
  vcat9: D75_PP2A => D + PP2A; Spine*vcat9_k1*D75_PP2A; vcat9 is "D75_dephospho_by_PP2A";
    vcat9_k1 = 10;
  voff9: D75_PP2A => D75 + PP2A; Spine*voff9_k1*D75_PP2A; voff9 is "D75_PP2A_unbinding";
    voff9_k1 = 24;
  vcat10: D75_PP2AP => D + PP2AP; Spine*vcat10_k1*D75_PP2AP; vcat10 is "D75_dephospho_by_PP2AP";
    vcat10_k1 = 24;
  voff10: D75_PP2AP => D75 + PP2AP; Spine*voff10_k1*D75_PP2AP; voff10 is "D75_PP2AP_unbinding";
    voff10_k1 = 40;
  von11: D137 + CDK5 => D137_CDK5; Spine*von11_k1*D137*CDK5; von11 is "D137_CDK5_binding";
    von11_k1 = 5600000;
  von12: D137 + PKA => D137_PKA; Spine*von12_k1*D137*PKA; von12 is "D137_PKA_binding";
    von12_k1 = 5600000;
  von13: D137 + PP2C => D137_PP2C; Spine*von13_k1*D137*PP2C; von13 is "D137_PP2C_binding";
    von13_k1 = 7500000;
  voff11: D137_CDK5 => D137 + CDK5; Spine*voff11_k1*D137_CDK5; voff11 is "D137_CDK5_unbinding";
    voff11_k1 = 12;
  vcat11: D137_CDK5 => D75_137 + CDK5; Spine*vcat11_k1*D137_CDK5; vcat11 is "D137_Phospho_by_CDK5_on_75";
    vcat11_k1 = 3;
  voff12: D137_PKA => D137 + PKA; Spine*voff12_k1*D137_PKA; voff12 is "D137_PKA_unbinding";
    voff12_k1 = 10.8;
  vcat12: D137_PKA => D34_137 + PKA; Spine*vcat12_k1*D137_PKA; vcat12 is "D137_phospho_by_PKA_on_34";
    vcat12_k1 = 2.7;
  vcat13: D137_PP2C => D + PP2C; Spine*vcat13_k1*D137_PP2C; vcat13 is "D137_dephospho_by_PP2C";
    vcat13_k1 = 3;
  voff13: D137_PP2C => D137 + PP2C; Spine*voff13_k1*D137_PP2C; voff13 is "D137_PP2C_unbinding";
    voff13_k1 = 12;
  von14: D34_75 + CK1 => D34_75_CK1; Spine*von14_k1*D34_75*CK1; von14 is "D34:75_CK1_binding";
    von14_k1 = 4400000;
  von18: D34_137 + CDK5 => D34_137_CDK5; Spine*von18_k1*D34_137*CDK5; von18 is "D34:137_CDK5_binding";
    von18_k1 = 5600000;
  voff18: D34_137_CDK5 => D34_137 + CDK5; Spine*voff18_k1*D34_137_CDK5; voff18 is "D34:137_CDK5_unbinding";
    voff18_k1 = 12;
  voff14: D34_75_CK1 => D34_75 + CK1; Spine*voff14_k1*D34_75_CK1; voff14 is "D34:75_CK1_unbinding";
    voff14_k1 = 12;
  vcat14: D34_75_CK1 => D34_75_137 + CK1; Spine*vcat14_k1*D34_75_CK1; vcat14 is "D34:75_phospho_by_CK1_on_137";
    vcat14_k1 = 3;
  vcat18: D34_137_CDK5 => D34_75_137 + CDK5; Spine*vcat18_k1*D34_137_CDK5; vcat18 is "D34:137_phospho_by_CDK5_on_75";
    vcat18_k1 = 3;
  von21: D75_137 + PKA => D75_137_PKA; Spine*von21_k1*D75_137*PKA; von21 is "D75:137_PKA_binding";
    von21_k1 = 5600000;
  vcat21: D75_137_PKA => D34_75_137 + PKA; Spine*vcat21_k1*D75_137_PKA; vcat21 is "D75:137_phospho_by_PKA_on_34";
    vcat21_k1 = 0;
  voff21: D75_137_PKA => D75_137 + PKA; Spine*voff21_k1*D75_137_PKA; voff21 is "D75:137_PKA_unbinding";
    voff21_k1 = 10.8;
  von17: D34_75 + PP2B => D34_75_PP2B; Spine*von17_k1*D34_75*PP2B; von17 is "D34:75_PP2B_binding";
    von17_k1 = 10000000;
  voff17: D34_75_PP2B => D34_75 + PP2B; Spine*voff17_k1*D34_75_PP2B; voff17 is "D34:75_PP2B_unbinding";
    voff17_k1 = 1600;
  vcat17: D34_75_PP2B => D75 + PP2B; Spine*vcat17_k1*D34_75_PP2B; vcat17 is "D34:75_dephopsho_by_PP2B_on_34";
    vcat17_k1 = 4;
  von19: D34_137 + PP2B => D34_137_PP2B; Spine*von19_k1*D34_137*PP2B; von19 is "D34:137_PP2B_binding";
    von19_k1 = 75000;
  vcat19: D34_137_PP2B => D137 + PP2B; Spine*vcat19_k1*D34_137_PP2B; vcat19 is "D34:137_dephospho_by_PP2B_on_34";
    vcat19_k1 = 0.03;
  voff19: D34_137_PP2B => D34_137 + PP2B; Spine*voff19_k1*D34_137_PP2B; voff19 is "D34:137_PP2B_unbinding";
    voff19_k1 = 0.12;
  von27: D34_75_137 + PP2B => D34_75_137_PP2B; Spine*von27_k1*D34_75_137*PP2B; von27 is "D34:75:137_PP2B_binding";
    von27_k1 = 75000;
  voff27: D34_75_137_PP2B => D34_75_137 + PP2B; Spine*voff27_k1*D34_75_137_PP2B; voff27 is "D34:75:137_PP2B_unbinding";
    voff27_k1 = 120;
  vcat27: D34_75_137_PP2B => D75_137 + PP2B; Spine*vcat27_k1*D34_75_137_PP2B; vcat27 is "D34:75:137_dephospho_by_PP2B_on_34";
    vcat27_k1 = 0.03;
  von15: D34_75 + PP2A => D34_75_PP2A; Spine*von15_k1*D34_75*PP2A; von15 is "D34:75_PP2A_binding";
    von15_k1 = 3800000;
  vcat15: D34_75_PP2A => D34 + PP2A; Spine*vcat15_k1*D34_75_PP2A; vcat15 is "D34:75_dephospho_by_PP2A_on_75";
    vcat15_k1 = 10;
  voff15: D34_75_PP2A => D34_75 + PP2A; Spine*voff15_k1*D34_75_PP2A; voff15 is "D34:75_PP2A_unbinding";
    voff15_k1 = 24;
  von22: D75_137 + PP2A => D75_137_PP2A; Spine*von22_k1*D75_137*PP2A; von22 is "D75:137_PP2A_binding";
    von22_k1 = 3800000;
  vcat22: D75_137_PP2A => D137 + PP2A; Spine*vcat22_k1*D75_137_PP2A; vcat22 is "D75:137_dephospho_by_PP2A_on_75";
    vcat22_k1 = 10;
  voff22: D75_137_PP2A => D75_137 + PP2A; Spine*voff22_k1*D75_137_PP2A; voff22 is "D75:137_PP2A_unbinding";
    voff22_k1 = 24;
  von25: D34_75_137 + PP2A => D34_75_137_PP2A; Spine*von25_k1*D34_75_137*PP2A; von25 is "D34:75:137_PP2A_binding";
    von25_k1 = 3800000;
  vcat25: D34_75_137_PP2A => D34_137 + PP2A; Spine*vcat25_k1*D34_75_137_PP2A; vcat25 is "D34:75:137_dephospho_by_PP2A_on_75";
    vcat25_k1 = 10;
  voff25: D34_75_137_PP2A => D34_75_137 + PP2A; Spine*voff25_k1*D34_75_137_PP2A; voff25 is "D34:75:137_PP2A_unbinding";
    voff25_k1 = 24;
  von16: D34_75 + PP2AP => D34_75_PP2AP; Spine*von16_k1*D34_75*PP2AP; von16 is "D34:75_PP2AP_binding";
    von16_k1 = 17000000;
  vcat16: D34_75_PP2AP => D34 + PP2AP; Spine*vcat16_k1*D34_75_PP2AP; vcat16 is "D34:75_dephospho_by_PP2AP_on_75";
    vcat16_k1 = 24;
  voff16: D34_75_PP2AP => D34_75 + PP2AP; Spine*voff16_k1*D34_75_PP2AP; voff16 is "D34:75_PP2AP_unbinding";
    voff16_k1 = 40;
  von23: D75_137 + PP2AP => D75_137_PP2AP; Spine*von23_k1*D75_137*PP2AP; von23 is "D75:137_PP2AP_binding";
    von23_k1 = 17000000;
  vcat23: D75_137_PP2AP => D137 + PP2AP; Spine*vcat23_k1*D75_137_PP2AP; vcat23 is "D75:137_dephospho_by_PP2AP_on_75";
    vcat23_k1 = 24;
  voff23: D75_137_PP2AP => D75_137 + PP2AP; Spine*voff23_k1*D75_137_PP2AP; voff23 is "D75:137_PP2AP_unbinding";
    voff23_k1 = 40;
  vcat26: D34_75_137_PP2AP => D34_137 + PP2AP; Spine*vcat26_k1*D34_75_137_PP2AP; vcat26 is "D34:75:137_dephospho_by_PP2AP_on 75";
    vcat26_k1 = 24;
  von26: D34_75_137 + PP2AP => D34_75_137_PP2AP; Spine*von26_k1*D34_75_137*PP2AP; von26 is "D34:75:137_PP2AP_binding";
    von26_k1 = 17000000;
  voff26: D34_75_137_PP2AP => D34_75_137 + PP2AP; Spine*voff26_k1*D34_75_137_PP2AP; voff26 is "D34:75:137_PP2AP_unbinding";
    voff26_k1 = 40;
  von20: D34_137 + PP2C => D34_137_PP2C; Spine*von20_k1*D34_137*PP2C; von20 is "D34:137_PP2C_binding";
    von20_k1 = 7500000;
  vcat20: D34_137_PP2C => D34 + PP2C; Spine*vcat20_k1*D34_137_PP2C; vcat20 is "D34:137_dephospho_by_PP2C_on_137";
    vcat20_k1 = 3;
  voff20: D34_137_PP2C => D34_137 + PP2C; Spine*voff20_k1*D34_137_PP2C; voff20 is "D34:137_PP2C_unbinding";
    voff20_k1 = 12;
  von24: D75_137 + PP2C => D75_137_PP2C; Spine*von24_k1*D75_137*PP2C; von24 is "D75:137_PP2C_binding";
    von24_k1 = 7500000;
  vcat24: D75_137_PP2C => D75 + PP2C; Spine*vcat24_k1*D75_137_PP2C; vcat24 is "D75:137_dephospho_by_PP2C_137";
    vcat24_k1 = 3;
  voff24: D75_137_PP2C => D75_137 + PP2C; Spine*voff24_k1*D75_137_PP2C; voff24 is "D75:137_PP2C_unbinding";
    voff24_k1 = 12;
  von28: D34_75_137 + PP2C => D34_75_137_PP2C; Spine*von28_k1*D34_75_137*PP2C; von28 is "D34:75:137_PP2C_binding";
    von28_k1 = 7500000;
  vcat28: D34_75_137_PP2C => D34_75 + PP2C; Spine*vcat28_k1*D34_75_137_PP2C; vcat28 is "D34:75:137_dephospho_by_PP2C_on_137";
    vcat28_k1 = 3;
  voff28: D34_75_137_PP2C => D34_75_137 + PP2C; Spine*voff28_k1*D34_75_137_PP2C; voff28 is "D34:75:137_PP2C_unbinding";
    voff28_k1 = 12;
  von29: CK1P + PP2B => CK1P_PP2B; Spine*von29_k1*CK1P*PP2B; von29 is "CK1P_PP2B_binding";
    von29_k1 = 30000000;
  voff29: CK1P_PP2B => CK1P + PP2B; Spine*voff29_k1*CK1P_PP2B; voff29 is "CK1P_PP2B_unbinding";
    voff29_k1 = 24;
  vcat29: CK1P_PP2B => CK1 + PP2B; Spine*vcat29_k1*CK1P_PP2B; vcat29 is "CK1P_dephospho_by_PP2B";
    vcat29_k1 = 6;
  vcat30: CK1 => CK1P; Spine*vcat30_k1*CK1; vcat30 is "CK1_phosphorylation";
    vcat30_k1 = 1;
  von31: PDE + PKA => PDE_PKA; Spine*von31_k1*PDE*PKA; von31 is "PDE_PKA_binding";
    von31_k1 = 6000000;
  vcat31: PDE_PKA => PDEP + PKA; Spine*vcat31_k1*PDE_PKA; vcat31 is "PDE_phospho_by_PKA";
    vcat31_k1 = 9;
  voff31: PDE_PKA => PDE + PKA; Spine*voff31_k1*PDE_PKA; voff31 is "PDE_PKA_unbinding";
    voff31_k1 = 36;
  vcat32: PDEP => PDE; Spine*vcat32_k1*PDEP; vcat32 is "PDEP_dephospho";
    vcat32_k1 = 0.1;
  von33: PP2A + PKA => PP2A_PKA; Spine*von33_k1*PP2A*PKA; von33 is "PP2A_PKA_binding";
    von33_k1 = 10000000;
  voff33: PP2A_PKA => PP2A + PKA; Spine*voff33_k1*PP2A_PKA; voff33 is "PP2A_PKA_unbinding";
    voff33_k1 = 16;
  vcat33: PP2A_PKA => PP2AP + PKA; Spine*vcat33_k1*PP2A_PKA; vcat33 is "PP2A_phospho_by_PKA";
    vcat33_k1 = 4;
  vcat34: PP2AP => PP2A; Spine*vcat34_k1*PP2AP; vcat34 is "PP2AP_dephospho";
    vcat34_k1 = 5;
  von35: PP2Binactive + 2 Ca => PP2BinactiveCa2; Spine*von35_k1*PP2Binactive*Ca^2; von35 is "PP2Binactive_Ca_binding";
    von35_k1 = 1e15;
  von36: PP2BinactiveCa2 + 2 Ca => PP2B; Spine*von36_k1*PP2BinactiveCa2*Ca^2; von36 is "PP2B_activation";
    von36_k1 = 3e15;
  voff35: PP2BinactiveCa2 => PP2Binactive + 2 Ca; Spine*voff35_k1*PP2BinactiveCa2; voff35 is "PP2BinactiveCa2_Ca_unbinding";
    voff35_k1 = 1;
  voff36: PP2B => PP2BinactiveCa2 + 2 Ca; Spine*voff36_k1*PP2B; voff36 is "PP2B_inactivation";
    voff36_k1 = 1;
  von37: R2C2 + cAMP => cAMP_R2C2; Spine*von37_k1*R2C2*cAMP; von37 is "R2C2_cAMP_binding";
    von37_k1 = 54000000;
  von38: cAMP_R2C2 + cAMP => cAMP2_R2C2; Spine*von38_k1*cAMP_R2C2*cAMP; von38 is "cAMP_R2C2_binding_by_cAMP";
    von38_k1 = 54000000;
  von39: cAMP2_R2C2 + cAMP => cAMP3_R2C2; Spine*von39_k1*cAMP2_R2C2*cAMP; von39 is "cAMP2_R2C2_binding_by_cAMP";
    von39_k1 = 75000000;
  von40: cAMP3_R2C2 + cAMP => cAMP4_R2C2; Spine*von40_k1*cAMP3_R2C2*cAMP; von40 is "cAMP3_R2C2_binding_by_cAMP";
    von40_k1 = 75000000;
  voff37: cAMP_R2C2 => R2C2 + cAMP; Spine*voff37_k1*cAMP_R2C2; voff37 is "cAMP_R2C2_unbinding";
    voff37_k1 = 33;
  voff38: cAMP2_R2C2 => cAMP_R2C2 + cAMP; Spine*voff38_k1*cAMP2_R2C2; voff38 is "cAMP2_R2C2_unbinding";
    voff38_k1 = 33;
  voff39: cAMP3_R2C2 => cAMP2_R2C2 + cAMP; Spine*voff39_k1*cAMP3_R2C2; voff39 is "cAMP3_R2C2_unbinding";
    voff39_k1 = 110;
  voff40: cAMP4_R2C2 => cAMP3_R2C2 + cAMP; Spine*voff40_k1*cAMP4_R2C2; voff40 is "cAMP4_R2C2_unbinding";
    voff40_k1 = 32.5;
  von41: cAMP4_R2C + PKA => cAMP4_R2C2; Spine*von41_k1*cAMP4_R2C*PKA; von41 is "cAMP4_R2C_PKA_binding";
    von41_k1 = 18000000;
  voff41: cAMP4_R2C2 => cAMP4_R2C + PKA; Spine*voff41_k1*cAMP4_R2C2; voff41 is "cAMP4_R2C2_PKA_unbinding";
    voff41_k1 = 60;
  von42: cAMP4_R2 + PKA => cAMP4_R2C; Spine*von42_k1*cAMP4_R2*PKA; von42 is "cAMP4_R2_PKA_binding";
    von42_k1 = 18000000;
  von43: cAMP4_R2C => cAMP4_R2 + PKA; Spine*von43_k1*cAMP4_R2C; von43 is "cAMP4_R2C_PKA_unbinding";
    von43_k1 = 60;
  von44: cAMP + PDE => cAMP_PDE; Spine*von44_k1*cAMP*PDE; von44 is "cAMP_PDE_binding";
    von44_k1 = 2520000;
  voff44: cAMP_PDE => cAMP + PDE; Spine*voff44_k1*cAMP_PDE; voff44 is "cAMP_PDE_unbinding";
    voff44_k1 = 40;
  vcat44: cAMP_PDE => AMP + PDE; Spine*vcat44_k1*cAMP_PDE; vcat44 is "cAMP_PDE_degradation";
    vcat44_k1 = 10;
  von45: cAMP + PDEP => cAMP_PDEP; Spine*von45_k1*cAMP*PDEP; von45 is "cAMP_PDEP_binding";
    von45_k1 = 5040000;
  voff45: cAMP_PDEP => cAMP + PDEP; Spine*voff45_k1*cAMP_PDEP; voff45 is "cAMP_PDEP_unbinding";
    voff45_k1 = 80;
  vcat45: cAMP_PDEP => AMP + PDEP; Spine*vcat45_k1*cAMP_PDEP; vcat45 is "cAMP_PDEP_degradation";
    vcat45_k1 = 20;
  Ca_in: $Empty => Ca; Spine*Constant_flux__irreversible(k57);
  Ca_destroy: Ca => $Empty; Spine*Ca_destroy_k1*Ca;
    Ca_destroy_k1 = 1.7;
  von46: D34_75 + PP2ACa => D34_75_PP2ACa; Spine*von46_k1*D34_75*PP2ACa; von46 is "D34:75_PP2ACa_binding";
    von46_k1 = 3800000;
  von47: D34_75_137 + PP2ACa => D34_75_137_PP2ACa; Spine*von47_k1*D34_75_137*PP2ACa; von47 is "D34:75:137_PP2ACa_binding";
    von47_k1 = 3800000;
  vcat47: D34_75_137_PP2ACa => D34_137 + PP2ACa; Spine*vcat47_k1*D34_75_137_PP2ACa; vcat47 is "D34:75:137_dephospho_by_PP2ACa_on_75";
    vcat47_k1 = 10;
  voff47: D34_75_137_PP2ACa => D34_75_137 + PP2ACa; Spine*voff47_k1*D34_75_137_PP2ACa; voff47 is "D34:75:137_PP2ACa_unbinding";
    voff47_k1 = 6;
  vcat46: D34_75_PP2ACa => D34 + PP2ACa; Spine*vcat46_k1*D34_75_PP2ACa; vcat46 is "D34:75_dephospho_by_PP2ACa_on_75";
    vcat46_k1 = 10;
  voff46: D34_75_PP2ACa => D34_75 + PP2ACa; Spine*voff46_k1*D34_75_PP2ACa; voff46 is "D34:75_PP2ACa_unbinding";
    voff46_k1 = 6;
  von48: D75 + PP2ACa => D75_PP2ACa; Spine*von48_k1*D75*PP2ACa; von48 is "D75_PP2ACa_binding";
    von48_k1 = 3800000;
  von49: D75_137 + PP2ACa => D75_137_PP2ACa; Spine*von49_k1*D75_137*PP2ACa; von49 is "D75:137_PP2ACa_binding";
    von49_k1 = 3800000;
  vcat49: D75_137_PP2ACa => D137 + PP2ACa; Spine*vcat49_k1*D75_137_PP2ACa; vcat49 is "D75:137_dephospho_by_PP2ACa_on_75";
    vcat49_k1 = 10;
  voff49: D75_137_PP2ACa => D75_137 + PP2ACa; Spine*voff49_k1*D75_137_PP2ACa; voff49 is "D75:137_PP2ACa_unbinding";
    voff49_k1 = 6;
  vcat48: D75_PP2ACa => D + PP2ACa; Spine*vcat48_k1*D75_PP2ACa; vcat48 is "D75_dephospho_by_PP2ACa_on_75";
    vcat48_k1 = 10;
  voff48: D75_PP2ACa => D75 + PP2ACa; Spine*voff48_k1*D75_PP2ACa; voff48 is "D75_PP2ACa_unbinding";
    voff48_k1 = 6;
  von50: D34_75 + PP2APCa => D34_75_PP2APCa; Spine*von50_k1*D34_75*PP2APCa; von50 is "D34:75_PP2APCa_binding";
    von50_k1 = 17000000;
  von51: D34_75_137 + PP2APCa => D34_75_137_PP2APCa; Spine*von51_k1*D34_75_137*PP2APCa; von51 is "D34:75:137_PP2APCa_binding";
    von51_k1 = 17000000;
  vcat51: D34_75_137_PP2APCa => PP2APCa + D34_137; Spine*vcat51_k1*D34_75_137_PP2APCa; vcat51 is "D34:75:137_dephospho_by_PP2APCa_on_75";
    vcat51_k1 = 24;
  voff51: D34_75_137_PP2APCa => D34_75_137 + PP2APCa; Spine*voff51_k1*D34_75_137_PP2APCa; voff51 is "D34:75:137_PP2APCa_unbinding";
    voff51_k1 = 10;
  vcat50: D34_75_PP2APCa => D34 + PP2APCa; Spine*vcat50_k1*D34_75_PP2APCa; vcat50 is "D34:75_dephospho_by_PP2APCa_on_75";
    vcat50_k1 = 24;
  voff50: D34_75_PP2APCa => D34_75 + PP2APCa; Spine*voff50_k1*D34_75_PP2APCa; voff50 is "D34:75_PP2APCa_unbinding";
    voff50_k1 = 10;
  von52: D75 + PP2APCa => D75_PP2APCa; Spine*von52_k1*D75*PP2APCa; von52 is "D75_PP2APCa_binding";
    von52_k1 = 17000000;
  von53: D75_137 + PP2APCa => D75_137_PP2APCa; Spine*von53_k1*D75_137*PP2APCa; von53 is "D75:137_PP2APCa_binding";
    von53_k1 = 17000000;
  vcat53: D75_137_PP2APCa => D137 + PP2APCa; Spine*vcat53_k1*D75_137_PP2APCa; vcat53 is "D75:137_dephospho_by_PP2APCa_on_75";
    vcat53_k1 = 24;
  voff53: D75_137_PP2APCa => D75_137 + PP2APCa; Spine*voff53_k1*D75_137_PP2APCa; voff53 is "D75:137_PP2APCa_unbinding";
    voff53_k1 = 10;
  vcat52: D75_PP2APCa => D + PP2APCa; Spine*vcat52_k1*D75_PP2APCa; vcat52 is "D75_dephospho_by_PP2APCa_on_75";
    vcat52_k1 = 24;
  voff52: D75_PP2APCa => D75 + PP2APCa; Spine*voff52_k1*D75_PP2APCa; voff52 is "D75_PP2APCa_unbinding";
    voff52_k1 = 10;
  von54: Ca + PP2A => PP2ACa; Spine*von54_k1*Ca*PP2A; von54 is "PP2A_Ca_binding";
    von54_k1 = 200000;
  voff54: PP2ACa => PP2A + Ca; Spine*voff54_k1*PP2ACa; voff54 is "PP2A_Ca_unbinding";
    voff54_k1 = 1;
  von55: PP2ACa + PKA => PP2ACa_PKA; Spine*von55_k1*PP2ACa*PKA; von55 is "PP2ACa_PKA_binding";
    von55_k1 = 10000000;
  vcat55: PP2ACa_PKA => PP2APCa + PKA; Spine*vcat55_k1*PP2ACa_PKA; vcat55 is "PP2ACa_phospho_by_PKA";
    vcat55_k1 = 4;
  von56: PP2AP + Ca => PP2APCa; Spine*von56_k1*PP2AP*Ca; von56 is "PP2AP_Ca_binding";
    von56_k1 = 200000;
  voff56: PP2APCa => PP2AP + Ca; Spine*voff56_k1*PP2APCa; voff56 is "PP2APCa_unbinding";
    voff56_k1 = 1;
  vcat56: PP2APCa => PP2ACa; Spine*vcat56_k1*PP2APCa; vcat56 is "PP2APCa_dephospho";
    vcat56_k1 = 5;
  voff55: PP2ACa_PKA => PP2ACa + PKA; Spine*voff55_k1*PP2ACa_PKA; voff55 is "PP2ACa_PKA_unbinding";
    voff55_k1 = 16;

  // Events:
  cAMP_pulse_0: at (time >= cAMP_delay): cAMP = 6.6e-6;
  ca_on1_0: at (time >= cAMP_delay + cAMP_Ca_delay): k57 = kon_high;
  ca_on2_0: at (time >= cAMP_delay + cAMP_Ca_delay + 1*(spike_duration + spike_interval)): k57 = kon_high;
  ca_off: at (time >= cAMP_delay + cAMP_Ca_delay + spike_duration): k57 = kon_low;
  Ca_on3_0: at (time >= cAMP_delay + cAMP_Ca_delay + 2*(spike_duration + spike_interval)): k57 = kon_high;
  ca_on4_0: at (time >= cAMP_delay + cAMP_Ca_delay + 3*(spike_duration + spike_interval)): k57 = kon_high;
  ca_on5_0: at (time >= cAMP_delay + cAMP_Ca_delay + 4*(spike_duration + spike_interval)): k57 = kon_high;
  ca_on6_0: at (time >= cAMP_delay + cAMP_Ca_delay + 5*(spike_duration + spike_interval)): k57 = kon_high;
  ca_on7_0: at (time >= cAMP_delay + cAMP_Ca_delay + 6*(spike_duration + spike_interval)): k57 = kon_high;
  ca_on8_0: at (time >= cAMP_delay + cAMP_Ca_delay + 7*(spike_duration + spike_interval)): k57 = kon_high;
  ca_on9_0: at (time >= cAMP_delay + cAMP_Ca_delay + 8*(spike_duration + spike_interval)): k57 = kon_high;
  ca_on10_0: at (time >= cAMP_delay + cAMP_Ca_delay + 9*(spike_duration + spike_interval)): k57 = kon_high;
  ca_off2_0: at (time >= cAMP_delay + cAMP_Ca_delay + spike_duration + 1*(spike_interval + spike_duration)): k57 = kon_low;
  ca_off3_0: at (time >= cAMP_delay + cAMP_Ca_delay + spike_duration + 2*(spike_interval + spike_duration)): k57 = kon_low;
  ca_off4_0: at (time >= cAMP_delay + cAMP_Ca_delay + spike_duration + 3*(spike_interval + spike_duration)): k57 = kon_low;
  ca_off5_0: at (time >= cAMP_delay + cAMP_Ca_delay + spike_duration + 4*(spike_interval + spike_duration)): k57 = kon_low;
  ca_off6_0: at (time >= cAMP_delay + cAMP_Ca_delay + spike_duration + 5*(spike_interval + spike_duration)): k57 = kon_low;
  ca_off7_0: at (time >= cAMP_delay + cAMP_Ca_delay + spike_duration + 6*(spike_interval + spike_duration)): k57 = kon_low;
  ca_off8_0: at (time >= cAMP_delay + cAMP_Ca_delay + spike_duration + 7*(spike_interval + spike_duration)): k57 = kon_low;
  ca_off9_0: at (time >= cAMP_delay + cAMP_Ca_delay + spike_duration + 8*(spike_interval + spike_duration)): k57 = kon_low;
  ca_off10_0: at (time >= cAMP_delay + cAMP_Ca_delay + spike_duration + 9*(spike_interval + spike_duration)): k57 = kon_low;

  // Unit definitions:
  unit length = metre;
  unit area = metre^2;
  unit volume = litre;
  unit time = second;
  unit substance = mole;
end
