// SBML level 2 version 4
// command line:
// KaDE   oBS_FINALrules_thr75inhibition_PKArulesDiff.ka  oBS_FINALrates_thr75inhibition.ka   oBS_init.ka  oBS_obs_phosphoSites_22.ka   oBS_stimuli_pulse_spikes_CaWithRates.ka   -l  700    -ode-backend   sbml   -d  output-kade

model KaDe_output_()

  // Compartments:
  compartment default = 1 volume;

  // Species:
  species s1 in default = 4000/default; s1 is "R2C2(camp1, camp2, camp3, camp4, pka1~off, pka2~off)";
  species PP2C_a in default = 80/default; PP2C_a is "PP2C(a)";
  species PP2B_ca1_ca2_ca3_ca4_state_i in default = 200/default; PP2B_ca1_ca2_ca3_ca4_state_i is "PP2B(ca1, ca2, ca3, ca4, state~i)";
  species PP2A_ca_pSite_u in default = 120/default; PP2A_ca_pSite_u is "PP2A(ca, pSite~u)";
  species PDE_pSite_u in default = 1204/default; PDE_pSite_u is "PDE(pSite~u)";
  species CK1_pSite_u in default = 100/default; CK1_pSite_u is "CK1(pSite~u)";
  species CDK5_a in default = 120/default; CDK5_a is "CDK5(a)";
  species D_s_thr34_u_ser137_u_thr75_u in default = 3000/default; D_s_thr34_u_ser137_u_thr75_u is "D(s, thr34~u, ser137~u, thr75~u)";
  species Ca2_a_default in default = 0; Ca2_a_default is "Ca2+(a)";
  species s10 in default = 0; s10 is "CDK5(a!1), D(s!1, thr34~u, ser137~u, thr75~u)";
  species D_s_thr34_u_ser137_u_thr75_p in default = 0; D_s_thr34_u_ser137_u_thr75_p is "D(s, thr34~u, ser137~u, thr75~p)";
  species s12 in default = 0; s12 is "D(s!1, thr34~u, ser137~u, thr75~p), CK1(pSite~u!1)";
  species s13 in default = 0; s13 is "D(s!1, thr34~u, ser137~u, thr75~u), CK1(pSite~u!1)";
  species CK1_pSite_p in default = 0; CK1_pSite_p is "CK1(pSite~p)";
  species D_s_thr34_u_ser137_p_thr75_u in default = 0; D_s_thr34_u_ser137_p_thr75_u is "D(s, thr34~u, ser137~p, thr75~u)";
  species s16 in default = 0; s16 is "CDK5(a!1), D(s!1, thr34~u, ser137~p, thr75~u)";
  species D_s_thr34_u_ser137_p_thr75_p in default = 0; D_s_thr34_u_ser137_p_thr75_p is "D(s, thr34~u, ser137~p, thr75~p)";
  species s18 in default = 0; s18 is "D(s!1, thr34~u, ser137~p, thr75~p), PP2A(ca, pSite~u!1)";
  species s19 in default = 0; s19 is "D(s!1, thr34~u, ser137~u, thr75~p), PP2A(ca, pSite~u!1)";
  species Ca2_a_1_PP2A_ca_1_pSite_u in default = 0; Ca2_a_1_PP2A_ca_1_pSite_u is "Ca2+(a!1), PP2A(ca!1, pSite~u)";
  species s21 in default = 0; s21 is "Ca2+(a!1), D(s!2, thr34~u, ser137~p, thr75~p), PP2A(ca!1, pSite~u!2)";
  species s22 in default = 0; s22 is "Ca2+(a!1), D(s!2, thr34~u, ser137~u, thr75~p), PP2A(ca!1, pSite~u!2)";
  species s23 in default = 0; s23 is "Ca2+(a!1), PP2B(ca1!2, ca2!1, ca3, ca4, state~i), Ca2+(a!2)";
  species s24 in default = 0; s24 is "Ca2+(a!1), PP2B(ca1!2, ca2, ca3!1, ca4, state~i), Ca2+(a!2)";
  species s25 in default = 0; s25 is "Ca2+(a!1), PP2B(ca1!2, ca2, ca3, ca4!1, state~i), Ca2+(a!2)";
  species s26 in default = 0; s26 is "Ca2+(a!1), PP2B(ca1, ca2!2, ca3!1, ca4, state~i), Ca2+(a!2)";
  species s27 in default = 0; s27 is "Ca2+(a!1), PP2B(ca1, ca2!2, ca3, ca4!1, state~i), Ca2+(a!2)";
  species s28 in default = 0; s28 is "Ca2+(a!1), PP2B(ca1, ca2, ca3!2, ca4!1, state~i), Ca2+(a!2)";
  species s29 in default = 0; s29 is "Ca2+(a!1), PP2B(ca1!2, ca2!3, ca3!4, ca4!1, state~a), Ca2+(a!4), Ca2+(a!3), Ca2+(a!2)";
  species s30 in default = 0; s30 is "Ca2+(a!1), CK1(pSite~p!2), PP2B(ca1!1, ca2!3, ca3!4, ca4!5, state~a!2), Ca2+(a!5), Ca2+(a!4), Ca2+(a!3)";
  species s31 in default = 0; s31 is "D(s!1, thr34~u, ser137~p, thr75~p), PP2C(a!1)";
  species s32 in default = 0; s32 is "D(s!1, thr34~u, ser137~p, thr75~u), PP2C(a!1)";

  // Parameters:
  tinit = 0 time;
  tend = 700 time;
  period = 0.01 time;
  D34*~? = 0;
  Thr34:Thr75:Ser137~? = 0;
  Thr34:Ser137~? = 0;
  Thr34:Thr75~? = 0;
  Thr34~? = 0;
  PDEp~? = 0;
  PP2Ap~? = 0;
  PKAa? = 0;
  cAMP_on = 0;
  koff50 = 10;
  koff46 = 6;
  koff54 = 1;
  Avo = 6.022e23;
  V = 1e-15;
  k58 = 1.7;
  k57 = 15;
  kcat45 = 20;
  koff45 = 80;
  kcat44 = 10;
  koff44 = 40;
  koff41 = 60;
  koff40 = 32.5;
  koff39 = 110;
  koff38 = 33;
  koff36 = 1;
  koff35 = 1;
  kcat34 = 5;
  kcat33 = 4;
  koff33 = 16;
  kcat32 = 0.1;
  kcat31 = 9;
  koff31 = 36;
  kcat30 = 1;
  kcat29 = 6;
  koff29 = 24;
  kcat10 = 24;
  koff10 = 40;
  kcat9 = 10;
  koff9 = 24;
  kcat13 = 3;
  koff13 = 12;
  koff27 = 120;
  kcat19 = 0.03;
  koff19 = 0.12;
  koff17 = 1600;
  kcat6 = 4;
  koff6 = 16;
  kcat8 = 0;
  kcat3 = 2.7;
  koff3 = 10.8;
  kcat2 = 3;
  koff2 = 12;
  kcat1 = 3;
  koff1 = 12;

  // Reactions:
  re1: s31 => PP2C_a + D_s_thr34_u_ser137_u_thr75_p; kcat13*s31; re1 is "D(s!1,ser137~p), PP2C(a!1) -> D(s,ser137~u), PP2C(a)";
  re2: s31 => PP2C_a + D_s_thr34_u_ser137_p_thr75_p; koff13*s31; re2 is "D(s!1,ser137~p), PP2C(a!1) -> D(s,ser137~p), PP2C(a)";
  re3: s32 => PP2C_a + D_s_thr34_u_ser137_u_thr75_u; kcat13*s32; re3 is "D(s!1,ser137~p), PP2C(a!1) -> D(s,ser137~u), PP2C(a)";
  re4: s32 => PP2C_a + D_s_thr34_u_ser137_p_thr75_u; koff13*s32; re4 is "D(s!1,ser137~p), PP2C(a!1) -> D(s,ser137~p), PP2C(a)";
  re5: PP2C_a + D_s_thr34_u_ser137_p_thr75_u => s32; 7.5e6/(V*Avo)*D_s_thr34_u_ser137_p_thr75_u*PP2C_a; re5 is "D(s,ser137~p), PP2C(a) -> D(s!1,ser137~p), PP2C(a!1)";
  re6: PP2C_a + D_s_thr34_u_ser137_p_thr75_p => s31; 7.5e6/(V*Avo)*D_s_thr34_u_ser137_p_thr75_p*PP2C_a; re6 is "D(s,ser137~p), PP2C(a) -> D(s!1,ser137~p), PP2C(a!1)";
  re7: 2 Ca2_a_default + s23 => s29; 3e15/(V*Avo)^2*Ca2_a_default*Ca2_a_default*s23; re7 is "PP2B(ca1!_,ca2!_,ca3,ca4,state~i), Ca2+(a), Ca2+(a) -> PP2B(ca1!_,ca2!_,ca3!1,ca4!2,state~a), Ca2+(a!1), Ca2+(a!2)";
  re8: s23 => PP2B_ca1_ca2_ca3_ca4_state_i + 2 Ca2_a_default; koff35*s23; re8 is "PP2B(ca1!1,ca2!2,ca3,ca4,state~i), Ca2+(a!1), Ca2+(a!2) -> PP2B(ca1,ca2,ca3,ca4,state~i), Ca2+(a), Ca2+(a)";
  re9: 2 Ca2_a_default + s24 => s29; 3e15/(V*Avo)^2*Ca2_a_default*Ca2_a_default*s24; re9 is "PP2B(ca1!_,ca2,ca3!_,ca4,state~i), Ca2+(a), Ca2+(a) -> PP2B(ca1!_,ca2!1,ca3!_,ca4!2,state~a), Ca2+(a!1), Ca2+(a!2)";
  re10: s24 => PP2B_ca1_ca2_ca3_ca4_state_i + 2 Ca2_a_default; koff35*s24; re10 is "PP2B(ca1!1,ca2,ca3!2,ca4,state~i), Ca2+(a!1), Ca2+(a!2) -> PP2B(ca1,ca2,ca3,ca4,state~i), Ca2+(a), Ca2+(a)";
  re11: 2 Ca2_a_default + s25 => s29; 3e15/(V*Avo)^2*Ca2_a_default*Ca2_a_default*s25; re11 is "PP2B(ca1!_,ca2,ca3,ca4!_,state~i), Ca2+(a), Ca2+(a) -> PP2B(ca1!_,ca2!1,ca3!2,ca4!_,state~a), Ca2+(a!1), Ca2+(a!2)";
  re12: s25 => PP2B_ca1_ca2_ca3_ca4_state_i + 2 Ca2_a_default; koff35*s25; re12 is "PP2B(ca1!1,ca2,ca3,ca4!2,state~i), Ca2+(a!1), Ca2+(a!2) -> PP2B(ca1,ca2,ca3,ca4,state~i), Ca2+(a), Ca2+(a)";
  re13: 2 Ca2_a_default + s26 => s29; 3e15/(V*Avo)^2*Ca2_a_default*Ca2_a_default*s26; re13 is "PP2B(ca1,ca2!_,ca3!_,ca4,state~i), Ca2+(a), Ca2+(a) -> PP2B(ca1!1,ca2!_,ca3!_,ca4!2,state~a), Ca2+(a!1), Ca2+(a!2)";
  re14: s26 => PP2B_ca1_ca2_ca3_ca4_state_i + 2 Ca2_a_default; koff35*s26; re14 is "PP2B(ca1,ca2!1,ca3!2,ca4,state~i), Ca2+(a!1), Ca2+(a!2) -> PP2B(ca1,ca2,ca3,ca4,state~i), Ca2+(a), Ca2+(a)";
  re15: 2 Ca2_a_default + s27 => s29; 3e15/(V*Avo)^2*Ca2_a_default*Ca2_a_default*s27; re15 is "PP2B(ca1,ca2!_,ca3,ca4!_,state~i), Ca2+(a), Ca2+(a) -> PP2B(ca1!1,ca2!_,ca3!2,ca4!_,state~a), Ca2+(a!1), Ca2+(a!2)";
  re16: s27 => PP2B_ca1_ca2_ca3_ca4_state_i + 2 Ca2_a_default; koff35*s27; re16 is "PP2B(ca1,ca2!1,ca3,ca4!2,state~i), Ca2+(a!1), Ca2+(a!2) -> PP2B(ca1,ca2,ca3,ca4,state~i), Ca2+(a), Ca2+(a)";
  re17: s30 => CK1_pSite_u + s29; kcat29*s30; re17 is "CK1(pSite~p!1), PP2B(state~a!1) -> CK1(pSite~u), PP2B(state~a)";
  re18: s30 => CK1_pSite_p + s29; koff29*s30; re18 is "CK1(pSite~p!1), PP2B(state~a!1) -> CK1(pSite~p), PP2B(state~a)";
  re19: s29 => 2 Ca2_a_default + s28; koff36*s29; re19 is "PP2B(ca1!1,ca2!2,ca3!_,ca4!_,state~a), Ca2+(a!1), Ca2+(a!2) -> PP2B(ca1,ca2,ca3!_,ca4!_,state~i), Ca2+(a), Ca2+(a)";
  re20: s29 => 2 Ca2_a_default + s27; koff36*s29; re20 is "PP2B(ca1!1,ca2!_,ca3!2,ca4!_,state~a), Ca2+(a!1), Ca2+(a!2) -> PP2B(ca1,ca2!_,ca3,ca4!_,state~i), Ca2+(a), Ca2+(a)";
  re21: s29 => 2 Ca2_a_default + s26; koff36*s29; re21 is "PP2B(ca1!1,ca2!_,ca3!_,ca4!2,state~a), Ca2+(a!1), Ca2+(a!2) -> PP2B(ca1,ca2!_,ca3!_,ca4,state~i), Ca2+(a), Ca2+(a)";
  re22: s29 => 2 Ca2_a_default + s25; koff36*s29; re22 is "PP2B(ca1!_,ca2!1,ca3!2,ca4!_,state~a), Ca2+(a!1), Ca2+(a!2) -> PP2B(ca1!_,ca2,ca3,ca4!_,state~i), Ca2+(a), Ca2+(a)";
  re23: s29 => 2 Ca2_a_default + s24; koff36*s29; re23 is "PP2B(ca1!_,ca2!1,ca3!_,ca4!2,state~a), Ca2+(a!1), Ca2+(a!2) -> PP2B(ca1!_,ca2,ca3!_,ca4,state~i), Ca2+(a), Ca2+(a)";
  re24: s29 => 2 Ca2_a_default + s23; koff36*s29; re24 is "PP2B(ca1!_,ca2!_,ca3!1,ca4!2,state~a), Ca2+(a!1), Ca2+(a!2) -> PP2B(ca1!_,ca2!_,ca3,ca4,state~i), Ca2+(a), Ca2+(a)";
  re25: CK1_pSite_p + s29 => s30; 3e7/(V*Avo)*CK1_pSite_p*s29; re25 is "CK1(pSite~p), PP2B(state~a) -> CK1(pSite~p!1), PP2B(state~a!1)";
  re26: 2 Ca2_a_default + s28 => s29; 3e15/(V*Avo)^2*Ca2_a_default*Ca2_a_default*s28; re26 is "PP2B(ca1,ca2,ca3!_,ca4!_,state~i), Ca2+(a), Ca2+(a) -> PP2B(ca1!1,ca2!2,ca3!_,ca4!_,state~a), Ca2+(a!1), Ca2+(a!2)";
  re27: s28 => PP2B_ca1_ca2_ca3_ca4_state_i + 2 Ca2_a_default; koff35*s28; re27 is "PP2B(ca1,ca2,ca3!1,ca4!2,state~i), Ca2+(a!1), Ca2+(a!2) -> PP2B(ca1,ca2,ca3,ca4,state~i), Ca2+(a), Ca2+(a)";
  re28: PP2B_ca1_ca2_ca3_ca4_state_i + 2 Ca2_a_default => s28; 1e15/(V*Avo)^2*PP2B_ca1_ca2_ca3_ca4_state_i*Ca2_a_default*Ca2_a_default; re28 is "PP2B(ca1,ca2,ca3,ca4,state~i), Ca2+(a), Ca2+(a) -> PP2B(ca1,ca2,ca3!1,ca4!2,state~i), Ca2+(a!1), Ca2+(a!2)";
  re29: PP2B_ca1_ca2_ca3_ca4_state_i + 2 Ca2_a_default => s27; 1e15/(V*Avo)^2*PP2B_ca1_ca2_ca3_ca4_state_i*Ca2_a_default*Ca2_a_default; re29 is "PP2B(ca1,ca2,ca3,ca4,state~i), Ca2+(a), Ca2+(a) -> PP2B(ca1,ca2!1,ca3,ca4!2,state~i), Ca2+(a!1), Ca2+(a!2)";
  re30: PP2B_ca1_ca2_ca3_ca4_state_i + 2 Ca2_a_default => s26; 1e15/(V*Avo)^2*PP2B_ca1_ca2_ca3_ca4_state_i*Ca2_a_default*Ca2_a_default; re30 is "PP2B(ca1,ca2,ca3,ca4,state~i), Ca2+(a), Ca2+(a) -> PP2B(ca1,ca2!1,ca3!2,ca4,state~i), Ca2+(a!1), Ca2+(a!2)";
  re31: PP2B_ca1_ca2_ca3_ca4_state_i + 2 Ca2_a_default => s25; 1e15/(V*Avo)^2*PP2B_ca1_ca2_ca3_ca4_state_i*Ca2_a_default*Ca2_a_default; re31 is "PP2B(ca1,ca2,ca3,ca4,state~i), Ca2+(a), Ca2+(a) -> PP2B(ca1!1,ca2,ca3,ca4!2,state~i), Ca2+(a!1), Ca2+(a!2)";
  re32: PP2B_ca1_ca2_ca3_ca4_state_i + 2 Ca2_a_default => s24; 1e15/(V*Avo)^2*PP2B_ca1_ca2_ca3_ca4_state_i*Ca2_a_default*Ca2_a_default; re32 is "PP2B(ca1,ca2,ca3,ca4,state~i), Ca2+(a), Ca2+(a) -> PP2B(ca1!1,ca2,ca3!2,ca4,state~i), Ca2+(a!1), Ca2+(a!2)";
  re33: PP2B_ca1_ca2_ca3_ca4_state_i + 2 Ca2_a_default => s23; 1e15/(V*Avo)^2*PP2B_ca1_ca2_ca3_ca4_state_i*Ca2_a_default*Ca2_a_default; re33 is "PP2B(ca1,ca2,ca3,ca4,state~i), Ca2+(a), Ca2+(a) -> PP2B(ca1!1,ca2!2,ca3,ca4,state~i), Ca2+(a!1), Ca2+(a!2)";
  re34: Ca2_a_default + s18 => s21; 200000/(V*Avo)*s18*Ca2_a_default; re34 is "PP2A(ca), Ca2+(a) -> PP2A(ca!1), Ca2+(a!1)";
  re35: s18 => PP2A_ca_pSite_u + D_s_thr34_u_ser137_p_thr75_u; kcat9*s18; re35 is "D(s!1,thr75~p), PP2A(pSite~u!1) -> D(s,thr75~u), PP2A(pSite~u)";
  re36: s18 => PP2A_ca_pSite_u + D_s_thr34_u_ser137_p_thr75_p; koff9*s18; re36 is "D(s!1,thr75~p), PP2A(ca,pSite~u!1) -> D(s,thr75~p), PP2A(ca,pSite~u)";
  re37: Ca2_a_default + s19 => s22; 200000/(V*Avo)*s19*Ca2_a_default; re37 is "PP2A(ca), Ca2+(a) -> PP2A(ca!1), Ca2+(a!1)";
  re38: s19 => PP2A_ca_pSite_u + D_s_thr34_u_ser137_u_thr75_u; kcat9*s19; re38 is "D(s!1,thr75~p), PP2A(pSite~u!1) -> D(s,thr75~u), PP2A(pSite~u)";
  re39: s19 => PP2A_ca_pSite_u + D_s_thr34_u_ser137_u_thr75_p; koff9*s19; re39 is "D(s!1,thr75~p), PP2A(ca,pSite~u!1) -> D(s,thr75~p), PP2A(ca,pSite~u)";
  re40: s21 => Ca2_a_default + s18; koff54*s21; re40 is "PP2A(ca!1), Ca2+(a!1) -> PP2A(ca), Ca2+(a)";
  re41: s21 => D_s_thr34_u_ser137_p_thr75_p + Ca2_a_1_PP2A_ca_1_pSite_u; koff46*s21; re41 is "D(s!1,thr75~p), PP2A(ca!_,pSite~u!1) -> D(s,thr75~p), PP2A(ca!_,pSite~u)";
  re42: s21 => D_s_thr34_u_ser137_p_thr75_u + Ca2_a_1_PP2A_ca_1_pSite_u; kcat9*s21; re42 is "D(s!1,thr75~p), PP2A(pSite~u!1) -> D(s,thr75~u), PP2A(pSite~u)";
  re43: s22 => Ca2_a_default + s19; koff54*s22; re43 is "PP2A(ca!1), Ca2+(a!1) -> PP2A(ca), Ca2+(a)";
  re44: s22 => D_s_thr34_u_ser137_u_thr75_p + Ca2_a_1_PP2A_ca_1_pSite_u; koff46*s22; re44 is "D(s!1,thr75~p), PP2A(ca!_,pSite~u!1) -> D(s,thr75~p), PP2A(ca!_,pSite~u)";
  re45: s22 => D_s_thr34_u_ser137_u_thr75_u + Ca2_a_1_PP2A_ca_1_pSite_u; kcat9*s22; re45 is "D(s!1,thr75~p), PP2A(pSite~u!1) -> D(s,thr75~u), PP2A(pSite~u)";
  re46: Ca2_a_1_PP2A_ca_1_pSite_u => PP2A_ca_pSite_u + Ca2_a_default; koff54*Ca2_a_1_PP2A_ca_1_pSite_u; re46 is "PP2A(ca!1), Ca2+(a!1) -> PP2A(ca), Ca2+(a)";
  re47: D_s_thr34_u_ser137_u_thr75_p + Ca2_a_1_PP2A_ca_1_pSite_u => s22; 3.8e6/(V*Avo)*D_s_thr34_u_ser137_u_thr75_p*Ca2_a_1_PP2A_ca_1_pSite_u; re47 is "D(s,thr75~p), PP2A(pSite~u) -> D(s!1,thr75~p), PP2A(pSite~u!1)";
  re48: D_s_thr34_u_ser137_p_thr75_p + Ca2_a_1_PP2A_ca_1_pSite_u => s21; 3.8e6/(V*Avo)*D_s_thr34_u_ser137_p_thr75_p*Ca2_a_1_PP2A_ca_1_pSite_u; re48 is "D(s,thr75~p), PP2A(pSite~u) -> D(s!1,thr75~p), PP2A(pSite~u!1)";
  re49: PP2A_ca_pSite_u + Ca2_a_default => Ca2_a_1_PP2A_ca_1_pSite_u; 200000/(V*Avo)*PP2A_ca_pSite_u*Ca2_a_default; re49 is "PP2A(ca), Ca2+(a) -> PP2A(ca!1), Ca2+(a!1)";
  re50: PP2A_ca_pSite_u + D_s_thr34_u_ser137_u_thr75_p => s19; 3.8e6/(V*Avo)*D_s_thr34_u_ser137_u_thr75_p*PP2A_ca_pSite_u; re50 is "D(s,thr75~p), PP2A(pSite~u) -> D(s!1,thr75~p), PP2A(pSite~u!1)";
  re51: PP2A_ca_pSite_u + D_s_thr34_u_ser137_p_thr75_p => s18; 3.8e6/(V*Avo)*D_s_thr34_u_ser137_p_thr75_p*PP2A_ca_pSite_u; re51 is "D(s,thr75~p), PP2A(pSite~u) -> D(s!1,thr75~p), PP2A(pSite~u!1)";
  re52: s12 => CK1_pSite_u + D_s_thr34_u_ser137_p_thr75_p; kcat2*s12; re52 is "D(s!1,ser137~u), CK1(pSite~u!1) -> D(s,ser137~p), CK1(pSite~u)";
  re53: s12 => CK1_pSite_u + D_s_thr34_u_ser137_u_thr75_p; koff2*s12; re53 is "D(s!1,ser137~u), CK1(pSite~u!1) -> D(s,ser137~u), CK1(pSite~u)";
  re54: s16 => CDK5_a + D_s_thr34_u_ser137_p_thr75_p; kcat1*s16; re54 is "D(s!1,thr75~u), CDK5(a!1) -> D(s,thr75~p), CDK5(a)";
  re55: s16 => CDK5_a + D_s_thr34_u_ser137_p_thr75_u; koff1*s16; re55 is "D(s!1,thr75~u), CDK5(a!1) -> D(s,thr75~u), CDK5(a)";
  re56: CDK5_a + D_s_thr34_u_ser137_p_thr75_u => s16; 5.6e6/(V*Avo)*D_s_thr34_u_ser137_p_thr75_u*CDK5_a; re56 is "D(s,thr75~u), CDK5(a) -> D(s!1,thr75~u), CDK5(a!1)";
  re57: s13 => CK1_pSite_u + D_s_thr34_u_ser137_p_thr75_u; kcat2*s13; re57 is "D(s!1,ser137~u), CK1(pSite~u!1) -> D(s,ser137~p), CK1(pSite~u)";
  re58: s13 => CK1_pSite_u + D_s_thr34_u_ser137_u_thr75_u; koff2*s13; re58 is "D(s!1,ser137~u), CK1(pSite~u!1) -> D(s,ser137~u), CK1(pSite~u)";
  CK1_pSite_u_CK1_pSite_p: CK1_pSite_u => CK1_pSite_p; kcat30*CK1_pSite_u; CK1_pSite_u_CK1_pSite_p is "CK1(pSite~u) -> CK1(pSite~p)";
  re60: CK1_pSite_u + D_s_thr34_u_ser137_u_thr75_u => s13; 4.4e6/(V*Avo)*D_s_thr34_u_ser137_u_thr75_u*CK1_pSite_u; re60 is "D(s,ser137~u), CK1(pSite~u) -> D(s!1,ser137~u), CK1(pSite~u!1)";
  re61: CK1_pSite_u + D_s_thr34_u_ser137_u_thr75_p => s12; 4.4e6/(V*Avo)*D_s_thr34_u_ser137_u_thr75_p*CK1_pSite_u; re61 is "D(s,ser137~u), CK1(pSite~u) -> D(s!1,ser137~u), CK1(pSite~u!1)";
  re62: s10 => CDK5_a + D_s_thr34_u_ser137_u_thr75_p; kcat1*s10; re62 is "D(s!1,thr75~u), CDK5(a!1) -> D(s,thr75~p), CDK5(a)";
  re63: s10 => CDK5_a + D_s_thr34_u_ser137_u_thr75_u; koff1*s10; re63 is "D(s!1,thr75~u), CDK5(a!1) -> D(s,thr75~u), CDK5(a)";
  re64: CDK5_a + D_s_thr34_u_ser137_u_thr75_u => s10; 5.6e6/(V*Avo)*D_s_thr34_u_ser137_u_thr75_u*CDK5_a; re64 is "D(s,thr75~u), CDK5(a) -> D(s!1,thr75~u), CDK5(a!1)";
  re65: Ca2_a_default => ; k58*Ca2_a_default; re65 is "Ca2+(a) ->";
  re66: => Ca2_a_default; k57; re66 is "-> Ca2+(a)";

  // Unit definitions:
  unit substance = mole;
  unit volume = litre;
end
